folder simulations: version=36; creator=Apsim 7.8-r3977
  folder Prairies calibration dec 2015
    simulation PFnew
      metfile met: filename=Rafa-cobs-met-until-Nov2015.met
      clock
        start_date = 05/05/2008  # Enter the start date of the simulation
        end_date = 11/11/2013  # Enter the end date of the simulation
      summaryfile
      area paddock
        AgPasture ryegrass_clover_paspalum
          Nspecies = 3  # Number of species
          thisCropName = ryegrass_clover_paspalum  # Crop name shown as on the simulation tree
          cropName = ryegrass whiteclover paspalum  # Species names
          micrometType = grass     grass    grass  # crop type for MicroMet
          isAnnual = 0           0          0  # Annual species? no=0, yes=1
          isLegume = 0           0          0  # Legume species? no=0, yes=1
          photoPath = 3           4          3  # C3 or C4 species? C3=3, C4=4
          rootDepth = 1200 1200 1100
          rlvp = 1  1  1  # Root distribution parameter ([0-1] relative to Root depth)
          growthTmin = 3.6455928E+00     3.1664609E+00     4.0000000E-01  # Minimum temperature for growth
          growthTmax = 3.6000000E+01     4.5000000E+01     4.1000000E+01  # Maximum temperature for growth
          growthTopt = 2.2500000E+01     2.2802369E+01     2.8543513E+01  # Optimum temperature for growth
          growthTq = 1.5       1.5        1.5  # Curvture of growth response to temperature
          massFluxTmin = 5           5          5  # Minimum temperature for mass flux
          massFluxTopt = 20        20         20  # Optimum temperature for mass flux
          massFluxW0 = 2          2           2  # Scale factor for response of mass flux to soil moisture
          massFluxWopt = 0.5       0.5        0.5  # Optimum soil moisture for mass flux
          heatOnsetT = 38.390269406        38.000000000         35.481849730  # Heat effects- Onset temperature
          heatFullT = 40.983371573        46.000000000         41.272191134  # Heat effects- Full temperature
          heatSumT = 36.939310938          33.000000000         35.948772898  # Heat effects- Temperature sum for recovery
          coldOnsetT = 2.6150056756         3.1606047652         4.0000000000  # Cold effects- Onset temperature
          coldFullT = -.9914351598          -1.007263686         -.9997215961  # Cold effects- Full temperature
          coldSumT = 20         20        20  # Cold effects- Temperature sum for recovery
          Pm = 1.5138558E+00     1.6493120E+00    1.5039454E+00  # Reference CO2 assimilation rate (mg CO2/m2.s)
          maintRespiration = 1.9500000E+00  2.1298923E+00    2.6073932E+00  # Maintenance respiration coefficient (%)
          growthEfficiency = 8.7758981E-01    7.0000000E-01     7.0000000E-01
          SLA = 20       20         20  # Specific leaf area
          lightExtCoeff = .53674137831   .37972078054    .48276262769  # Light extinction coefficient
          stockParameter = 0.05     0.05      0.05  # Stock influence parameter
          maxRootFraction = .29226627798   .31618164197     .30000000000  # Maximum biomass fraction allocated to root
          leafRate = 3.5         3.5           3.5  # Reference leaf appearance rate without stress
          fLeaf = .53808649546    .61061766662    .70000000000  # Reference growth partition to leaves
          fStolon = 0.2          0           0  # Reference growth partition to stolon
          digestLive = 0.9       0.9        0.9  # Digestibility of live plant material
          digestDead = 0.9       0.9       0.9  # Digestibility of dead plant material
          dmtotal = 50    50       50  # Initial shoot dry matter (kg/ha)
          dmlitter = 50      50          50  # Initial litter dry matter (kg/ha)
          dmgreenmin = 50      50         50  # Minimum green dry matter (kg/ha)
          NcleafOpt = 2.8539131718    2.4000000000    3.0000000000  # N concentration - leaf optimum
          NcleafMax = 2.7089815314    3.3297088084    3.7366629996  # N concentration - leaf luxary
          NcleafMin = .76723199764    .65000000000    .65000000000  # N concentration - leaf scenescent
          NcstemFr = 5.0860278E-01   4.8365882E-01     .50234340956  # Stem N concentration as fraction of leaf N concentration
          NcstolFr = 0.4         0         0  # Stolon N concentration as fraction of leaf N concentration
          NcrootFr = .44308765510      .49056422305     .44988344081  # Root N concentration as fraction of leaf N concentration
          NMinFix = .1       0       0  # Minimum N fixation (when soil N is sufficient)
          NMaxFix = .6       0       0  # Maximum N fixation (when soil N is unavailable)
          CO2PmaxScale = 700     700       700  # CO2 - Scale factor for CO2 effect on photosynthesis
          CO2NScale = 600     600       600  # CO2 - Scale factor for CO2 effects on plant N concentration
          CO2NMin = 0.7      0.7        0.7  # CO2 - Minimum fraction that plant N concentration may reduce to uder elevated CO2
          CO2NCurvature = 2         2           2  # CO2 - Curvature factor of CO2 effect on plant N concentration
          Frgr = 1         1           1  # Relative growth factor
          WaterUptakeSource = apsim  # Water uptake done by AgPasture (calc) or by apsim?
          waterStressFactor = 0.5 0.5 0.5  # Scale factor of water stress on plant growth [0-1]
          rateLive2Dead = .02370481602  .02103293450 .02864225675
          rateDead2Litter = .08698084441 .07980521432 .08639544340
          rateRootSen = .00625115072 .00951677664 .00694292939
          waterStressFactor = 0.1 0.1 0.1  # water stress
        fertiliser
        folder Manager folder
          operations Prairie opeartions
            24/6/2008  ryegrass_clover_paspalum sow
            1/10/2008  ryegrass_clover_paspalum graze type = 'residue', amount = 250
            2/10/2008  surfaceorganicmatter tillage type = user_defined, f_incorp = 0.10 (), tillage_depth = 0.0 ()
            10/10/2009  ryegrass_clover_paspalum graze type = 'residue', amount = 250
            12/10/2009  surfaceorganicmatter tillage type = user_defined, f_incorp = .555922601 (), tillage_depth = 0.0 ()
            10/10/2010  ryegrass_clover_paspalum graze type = 'residue', amount = 250
            12/10/2010  surfaceorganicmatter tillage type = user_defined, f_incorp = .555922601 (), tillage_depth = 0.0 ()
            10/10/2011  ryegrass_clover_paspalum graze type = 'residue', amount = 250
            12/10/2011  surfaceorganicmatter tillage type = user_defined, f_incorp = .555922601 (), tillage_depth = 0.0 ()
            10/10/2012  ryegrass_clover_paspalum graze type = 'residue', amount = 250
            12/10/2012  surfaceorganicmatter tillage type = user_defined, f_incorp = .555922601 (), tillage_depth = 0.0 ()
            10/10/2013  ryegrass_clover_paspalum graze type = 'residue', amount = 250
            12/10/2013  surfaceorganicmatter tillage type = user_defined, f_incorp = .555922601 (), tillage_depth = 0.0 ()
            10/10/2014  ryegrass_clover_paspalum graze type = 'residue', amount = 250
            12/10/2014  surfaceorganicmatter tillage type = user_defined, f_incorp = .555922601 (), tillage_depth = 0.0 ()
            10/10/2015  ryegrass_clover_paspalum graze type = 'residue', amount = 250
            12/10/2015  surfaceorganicmatter tillage type = user_defined, f_incorp = .555922601 (), tillage_depth = 0.0 ()
            10/10/2016  ryegrass_clover_paspalum graze type = 'residue', amount = 250
            12/10/2016  surfaceorganicmatter tillage type = user_defined, f_incorp = .555922601 (), tillage_depth = 0.0 ()
            10/10/2017  ryegrass_clover_paspalum graze type = 'residue', amount = 250
            12/10/2017  surfaceorganicmatter tillage type = user_defined, f_incorp = .555922601 (), tillage_depth = 0.0 ()
            10/10/2018  ryegrass_clover_paspalum graze type = 'residue', amount = 250
            12/10/2018  surfaceorganicmatter tillage type = user_defined, f_incorp = .555922601 (), tillage_depth = 0.0 ()
            10/10/2019  ryegrass_clover_paspalum graze type = 'residue', amount = 250
            12/10/2019  surfaceorganicmatter tillage type = user_defined, f_incorp = .555922601 (), tillage_depth = 0.0 ()
            10/10/2020  ryegrass_clover_paspalum graze type = 'residue', amount = 250
            12/10/2020  surfaceorganicmatter tillage type = user_defined, f_incorp = .555922601 (), tillage_depth = 0.0 ()
            10/10/2021  ryegrass_clover_paspalum graze type = 'residue', amount = 250
            12/10/2021  surfaceorganicmatter tillage type = user_defined, f_incorp = .555922601 (), tillage_depth = 0.0 ()
            10/10/2022  ryegrass_clover_paspalum graze type = 'residue', amount = 250
            12/10/2022  surfaceorganicmatter tillage type = user_defined, f_incorp = .555922601 (), tillage_depth = 0.0 ()
            10/10/2023  ryegrass_clover_paspalum graze type = 'residue', amount = 250
            12/10/2023  surfaceorganicmatter tillage type = user_defined, f_incorp = .555922601 (), tillage_depth = 0.0 ()
            10/10/2024  ryegrass_clover_paspalum graze type = 'residue', amount = 250
            12/10/2024  surfaceorganicmatter tillage type = user_defined, f_incorp = .555922601 (), tillage_depth = 0.0 ()
            10/10/2025  ryegrass_clover_paspalum graze type = 'residue', amount = 250
            12/10/2025  surfaceorganicmatter tillage type = user_defined, f_incorp = .66707100 (), tillage_depth = 0.0 ()
            10/10/2026  ryegrass_clover_paspalum graze type = 'residue', amount = 250
            12/10/2026  surfaceorganicmatter tillage type = user_defined, f_incorp = .66707100 (), tillage_depth = 0.0 ()
            10/10/2027  ryegrass_clover_paspalum graze type = 'residue', amount = 250
            12/10/2027  surfaceorganicmatter tillage type = user_defined, f_incorp = .66707100 (), tillage_depth = 0.0 ()
            10/10/2028  ryegrass_clover_paspalum graze type = 'residue', amount = 250
            12/10/2028  surfaceorganicmatter tillage type = user_defined, f_incorp = .66707100 (), tillage_depth = 0.0 ()
            10/10/2029  ryegrass_clover_paspalum graze type = 'residue', amount = 250
            12/10/2029  surfaceorganicmatter tillage type = user_defined, f_incorp = .66707100 (), tillage_depth = 0.0 ()
            10/10/2030  ryegrass_clover_paspalum graze type = 'residue', amount = 250
            12/10/2030  surfaceorganicmatter tillage type = user_defined, f_incorp = .66707100 (), tillage_depth = 0.0 ()
            10/10/2031  ryegrass_clover_paspalum graze type = 'residue', amount = 250
            12/10/2031  surfaceorganicmatter tillage type = user_defined, f_incorp = .66707100 (), tillage_depth = 0.0 ()
            10/10/2032  ryegrass_clover_paspalum graze type = 'residue', amount = 250
            12/10/2032  surfaceorganicmatter tillage type = user_defined, f_incorp = .66707100 (), tillage_depth = 0.0 ()
            10/10/2033  ryegrass_clover_paspalum graze type = 'residue', amount = 250
            12/10/2033  surfaceorganicmatter tillage type = user_defined, f_incorp = .66707100 (), tillage_depth = 0.0 ()
            10/10/2034  ryegrass_clover_paspalum graze type = 'residue', amount = 250
            12/10/2034  surfaceorganicmatter tillage type = user_defined, f_incorp = .66707100 (), tillage_depth = 0.0 ()
            10/10/2035  ryegrass_clover_paspalum graze type = 'residue', amount = 250
            12/10/2035  surfaceorganicmatter tillage type = user_defined, f_incorp = .66707100 (), tillage_depth = 0.0 ()
            10/10/2036  ryegrass_clover_paspalum graze type = 'residue', amount = 250
            12/10/2036  surfaceorganicmatter tillage type = user_defined, f_incorp = .66707100 (), tillage_depth = 0.0 ()
            10/10/2037  ryegrass_clover_paspalum graze type = 'residue', amount = 250
            12/10/2037  surfaceorganicmatter tillage type = user_defined, f_incorp = .66707100 (), tillage_depth = 0.0 ()
            10/10/2038  ryegrass_clover_paspalum graze type = 'residue', amount = 250
            12/10/2038  surfaceorganicmatter tillage type = user_defined, f_incorp = .66707100 (), tillage_depth = 0.0 ()
            10/10/2039  ryegrass_clover_paspalum graze type = 'residue', amount = 250
            12/10/2039  surfaceorganicmatter tillage type = user_defined, f_incorp = .66707100 (), tillage_depth = 0.0 ()
            10/10/2040  ryegrass_clover_paspalum graze type = 'residue', amount = 250
            12/10/2040  surfaceorganicmatter tillage type = user_defined, f_incorp = .66707100 (), tillage_depth = 0.0 ()
            10/10/2041  ryegrass_clover_paspalum graze type = 'residue', amount = 250
            12/10/2041  surfaceorganicmatter tillage type = user_defined, f_incorp = .66707100 (), tillage_depth = 0.0 ()
            10/10/2042  ryegrass_clover_paspalum graze type = 'residue', amount = 250
            12/10/2042  surfaceorganicmatter tillage type = user_defined, f_incorp = .66707100 (), tillage_depth = 0.0 ()
            10/10/2043  ryegrass_clover_paspalum graze type = 'residue', amount = 250
            12/10/2043  surfaceorganicmatter tillage type = user_defined, f_incorp = .66707100 (), tillage_depth = 0.0 ()
            10/10/2044  ryegrass_clover_paspalum graze type = 'residue', amount = 250
            12/10/2044  surfaceorganicmatter tillage type = user_defined, f_incorp = .66707100 (), tillage_depth = 0.0 ()
            10/10/2045  ryegrass_clover_paspalum graze type = 'residue', amount = 250
            12/10/2045  surfaceorganicmatter tillage type = user_defined, f_incorp = .66707100 (), tillage_depth = 0.0 ()
            10/10/2046  ryegrass_clover_paspalum graze type = 'residue', amount = 250
            12/10/2046  surfaceorganicmatter tillage type = user_defined, f_incorp = .66707100 (), tillage_depth = 0.0 ()
            10/10/2047  ryegrass_clover_paspalum graze type = 'residue', amount = 250
            12/10/2047  surfaceorganicmatter tillage type = user_defined, f_incorp = .66707100 (), tillage_depth = 0.0 ()
            10/10/2048  ryegrass_clover_paspalum graze type = 'residue', amount = 250
            12/10/2048  surfaceorganicmatter tillage type = user_defined, f_incorp = .66707100 (), tillage_depth = 0.0 ()
            10/10/2049  ryegrass_clover_paspalum graze type = 'residue', amount = 250
            12/10/2049  surfaceorganicmatter tillage type = user_defined, f_incorp = .66707100 (), tillage_depth = 0.0 ()
            10/10/2050  ryegrass_clover_paspalum graze type = 'residue', amount = 250
            12/10/2050  surfaceorganicmatter tillage type = user_defined, f_incorp = .66707100 (), tillage_depth = 0.0 ()
            10/10/2051  ryegrass_clover_paspalum graze type = 'residue', amount = 250
            12/10/2051  surfaceorganicmatter tillage type = user_defined, f_incorp = .66707100 (), tillage_depth = 0.0 ()
            10/10/2052  ryegrass_clover_paspalum graze type = 'residue', amount = 250
            12/10/2052  surfaceorganicmatter tillage type = user_defined, f_incorp = .66707100 (), tillage_depth = 0.0 ()
            10/10/2053  ryegrass_clover_paspalum graze type = 'residue', amount = 250
            12/10/2053  surfaceorganicmatter tillage type = user_defined, f_incorp = .66707100 (), tillage_depth = 0.0 ()
            10/10/2054  ryegrass_clover_paspalum graze type = 'residue', amount = 250
            12/10/2054  surfaceorganicmatter tillage type = user_defined, f_incorp = .66707100 (), tillage_depth = 0.0 ()
            10/10/2055  ryegrass_clover_paspalum graze type = 'residue', amount = 250
            12/10/2055  surfaceorganicmatter tillage type = user_defined, f_incorp = .66707100 (), tillage_depth = 0.0 ()
            10/10/2056  ryegrass_clover_paspalum graze type = 'residue', amount = 250
            12/10/2056  surfaceorganicmatter tillage type = user_defined, f_incorp = .66707100 (), tillage_depth = 0.0 ()
            10/10/2057  ryegrass_clover_paspalum graze type = 'residue', amount = 250
            12/10/2057  surfaceorganicmatter tillage type = user_defined, f_incorp = .66707100 (), tillage_depth = 0.0 ()
            10/10/2058  ryegrass_clover_paspalum graze type = 'residue', amount = 250
            12/10/2058  surfaceorganicmatter tillage type = user_defined, f_incorp = .66707100 (), tillage_depth = 0.0 ()
            10/10/2059  ryegrass_clover_paspalum graze type = 'residue', amount = 250
            12/10/2059  surfaceorganicmatter tillage type = user_defined, f_incorp = .66707100 (), tillage_depth = 0.0 ()
            10/10/2060  ryegrass_clover_paspalum graze type = 'residue', amount = 250
            12/10/2060  surfaceorganicmatter tillage type = user_defined, f_incorp = .66707100 (), tillage_depth = 0.0 ()
            10/10/2061  ryegrass_clover_paspalum graze type = 'residue', amount = 250
            12/10/2061  surfaceorganicmatter tillage type = user_defined, f_incorp = .66707100 (), tillage_depth = 0.0 ()
            10/10/2062  ryegrass_clover_paspalum graze type = 'residue', amount = 250
            12/10/2062  surfaceorganicmatter tillage type = user_defined, f_incorp = .66707100 (), tillage_depth = 0.0 ()
            10/10/2063  ryegrass_clover_paspalum graze type = 'residue', amount = 250
            12/10/2063  surfaceorganicmatter tillage type = user_defined, f_incorp = .66707100 (), tillage_depth = 0.0 ()
            10/10/2064  ryegrass_clover_paspalum graze type = 'residue', amount = 250
            12/10/2064  surfaceorganicmatter tillage type = user_defined, f_incorp = .66707100 (), tillage_depth = 0.0 ()
          manager N fertilization
            # When should fertiliser be applied
            fert_date = 15-apr  # Enter fertiliser date (dd-mmm)
            fert_criteria = 1000  # Don't add fertiliser if N in top 2 layers exceeds (kg/ha)
            # Fertiliser application details
            fertmodule = fertiliser  # Module used to apply the fertiliser
            fert_amount = 84  # Amount of fertiliser to apply (kg/ha)
            fert_type = NO3_N  # Fertiliser type
            on start_of_day:
```
         if (today = date('[fert_date]') then
            N_topsoil = no3(1) + nh4(1) + no3(2) + nh4(2)
            if (N_topsoil < [fert_criteria]) then
               [fertmodule] apply amount = [fert_amount] (kg/ha), depth = 50 (mm), type = [fert_type] ()
            endif
         endif
```
          manager N Deposition
            #
            ppm = 0.01  # What to multiply rain by?
            # Model side stuff
            varname = N_deposition  # Name of the NO3_N deposition variable as seen by the model
            fertmodule = fertiliser  # Name of module that applies nitrogen
            on start_of_day:
```
 
            [varname] = rain * [ppm]
            N_deposition_tot = N_deposition_tot + [varname]
            if (rain > 0) then
               [fertmodule] apply amount = [varname](kg/ha), depth = 0 (mm), type = NO3_N ()
            endif
```
        Soil NicolletRanae_Initialized: NearestTown=Ames; State=Iowa; Country=US; ApsoilNumber=34; Latitude=0; Longitude=0; YearOfSampling=0; DataSource=web soil survey data revised
          SoilTemperature2
            MaxTTimeDefault = 14
            BoundaryLayerConductanceSource = calc
            BoundaryLayerConductance = 20
            BoundaryLayerConductanceIterations = 1
            NetRadiationSource = calc
            DefaultWindSpeed = 1.5
            DefaultAltitude = 270
            DefaultInstrumentHeight = 1.2
            BareSoilHeight = 2
            Clay = 25.7    25.7    26.4    28.1    28.5    29    29    27    27    27    27
          SoilOrganicMatter: RootCN=22; RootWt=776; SoilCN=11; EnrACoeff=7.4; EnrBCoeff=0.2; OCUnits=Total
            Thickness  OC    FBiom  FInert
            37         3.02  0.11   0.319
            38         2.94  0.092  0.328
            50         2.6   0.057  0.386
            90         2.33  0.013  0.452
            85         2.1   0.013  0.493
            100        1.31  0.014  0.533
            200        1.33  0.015  0.656
            300        1.15  0.016  0.694
            300        0.49  0.021  0.719
            320        0.16  0.024  0.729
            300        0.1   0.024  0.747
          Analysis: PHUnits=Water; BoronUnits=HotWater
            Thickness  PH      ParticleSizeSand  ParticleSizeSilt  ParticleSizeClay
            37         6.318   38.29             36.04             25.67
            38         6.318   38.29             36.04             25.67
            50         5.902   37.95             35.65             26.43
            90         5.9476  36.57             35.65             28.09
            85         5.959   36.23             35.65             28.5
            100        6.7     34                37                29
            200        6.7     34                37                29
            300        7.9     37                36                27
            300        7.9     37                36                27
            320        7.9     37                36                27
            300        7.9     37                36                27
          Sample Initial nitrogen: NO3Units=kgha; NH4Units=kgha; SWUnits=Volumetric; OCUnits=Total; PHUnits=Water
            Thickness  NO3  NH4  SW
            37         1    1    0.252
            38         1    0.9  0.284
            50         3    1.2  0.246
            90         5    0.5  0.244
            85         10   0.4  0.281
            100        10   0.3  0.252
            200        10   0.4  0.252
            300        0    0.5  0.284
            300        0    0.2  0.284
            320        0    0.7  0.284
            300        0    0.5  0.284
          Swim: Salb=0.13; CN2Bare=65; CNRed=20; CNCov=0.8; KDul=0.1; PSIDul=-100.000; VC=true; DTmin=0; DTmax=1440; MaxWaterIncrement=10; SpaceWeightingFactor=0; SoluteSpaceWeightingFactor=0; Diagnostics=false
            SwimSoluteParameters: Dis=15; Disp=1; A=1; DTHP=1
              zero: DTHC, WaterTableCl, WaterTableNO3, WaterTableNH4, WaterTableUrea, WaterTableTracer, WaterTableMineralisationInhibitor, WaterTableUreaseInhibitor, WaterTableNitrificationInhibitor, WaterTableDenitrificationInhibitor
              Thickness  NO3Exco  NO3FIP  NH4Exco  NH4FIP  UreaExco  UreaFIP  ClExco  ClFIP
              1000       0        1       100      1       0         1        0       1
              1000       0        1       100      1       0         1        0       1
              1000       0        1       100      1       0         1        0       1
            SwimWaterTable: WaterTableDepth=1650
            SwimSubsurfaceDrain: DrainDepth=1070; DrainSpacing=13500; DrainRadius=52; Klat=2800; ImpermDepth=3900
          Water
            Thickness  BD     AirDry  LL15   DUL    SAT    KS
            37         1.21   0.12    0.14   0.263  0.387  500
            38         1.21   0.14    0.161  0.296  0.42   500
            50         1.39   0.11    0.11   0.256  0.42   500
            90         1.478  0.11    0.11   0.254  0.42   500
            85         1.5    0.12    0.12   0.293  0.478  500
            100        1.5    0.125   0.125  0.262  0.455  500
            200        1.5    0.132   0.132  0.262  0.41   500
            300        1.551  0.1     0.1    0.296  0.394  250
            300        1.551  0.11    0.11   0.296  0.394  250
            320        1.551  0.138   0.138  0.296  0.394  25
            300        1.551  0.165   0.165  0.296  0.394  2
            SoilCrop ryegrass_clover_paspalum
              LL=[0.14, 0.161, 0.11, 0.11, 0.12, 0.125, 0.132, 0.132, 0.13, 0.138, 0.165]
              KL=[0.1, 0.1, 0.1, 0.09, 0.09, 0.08, 0.07, 0.07, 0.07, 0.06, 0.02]
              XF=[1, 1, 1, 1, 1, 1, 1, 1, 1, 1, 1]
            SoilCrop maize
              LL=[0.14, 0.161, 0.11, 0.11, 0.12, 0.125, 0.132, 0.132, 0.13, 0.138, 0.165]
              KL=[0.1, 0.1, 0.1, 0.02, 0.02, 0.01, 0.01, 0.01, 0.01, 0, 0]
              XF=[1, 1, 1, 1, 1, 1, 1, 1, 1, 1, 1]
          ini: filename=Soil-prairies.xml
        micromet: soilalbedo=0.23; a_interception=0.0; b_interception=0.0; c_interception=0.0; d_interception=0.0
        surfaceom SurfaceOrganicMatter
          PoolName = soybean  # Organic Matter pool name
          type = soybean  # Organic Matter type
          mass = 250  # Initial surface residue (kg/ha)
          cnr = 20  # C:N ratio of initial residue
          standing_fraction = 0  # Fraction of residue standing
        outputfile: filename=PFnew.out; title=PFnew
          variables agpasture
            variables: dd/mm/yyyy as Date, AboveGroundWt, BelowGroundWt, AboveGroundNPct, BelowGroundN, SpeciesLiveWt, SpeciesTotalWt, HarvestWt, AboveGroundLiveN, AboveGroundDeadN, watertable
          variables soil
            variables: OC_20cm, OC_90cm, OC_180cm, n2o_atm(), nitrification(), dnit(), MaySeptNDep, MaySeptTiles, MaySeptRain, MaySeptrunoff, MaySepEvap, MaySepTrans, MaySepNnetMin, MaySepDenit, MaySeptTilesNO3, MaySepResImmob, MaySepNuptake
          variables add
            variables: biom_c(), surfaceom_c, fom_c(), hum_c(), surfaceom_wt, AboveGroundDeadWt, Cover_dead, C_remob, LeafDeadWt, LitterDepositionWt, RootSenescenceWt, wf, surfaceom_n, surfaceom_cover, surface_CN_ratio, no3(), nh4(), tf_surface_om1, es, WaterUptake, eos, Cover_green, dlt_n_min_tot(), dlt_n_min(), dlt_n_min_res(), PlantFixedN, NitrogenDemand, NitrogenSupply, NitrogenUptake, PlantRemobilisedN, lai, LAI_green, LAI_dead, dlt_fom_c_atm(), dlt_fom_c_biom(), dlt_fom_c_hum(), dlt_fom_c_pool1(), dlt_fom_c_pool2(), dlt_fom_c_pool3(), dlt_fom_n_min(), dlt_res_c_biom(), dlt_res_c_hum(), DefoliatedDigestibility, HarvestN, HerbageDigestibility, RootSenescenceN, roots_cn, Remaining_Wt, Surface_sot, fom_n(), nit_tot(), sot_cnr, sot_cnrf, roots_N%, oc_5cm, oc_15cm, oc_30cm, oc_60cm, oc_100cm, IntRadn, soil_co2, root_co2, soil_root_co2, sw_5, sw_10, sw_15, sw_35, sw_75, st_5, st_10, st_15, st_35, st_75, subsurface_drain, GLFwater, GLFtemp, GLFn, ToRoot, ToRootDM, sotiris, fom_cn, year, subsurface_drain_no3, N_conc_mgLN
          events time step: event=end_day
        manager unit convertor
          on init:
```
! sotiris
 
 
!surfaceom_cover = 0.1
```
          on start_of_day:
```
sotiris = BelowGroundWt + fom_c()/0.44
fom_cn = fom_c() / fom_n()
sotiris1 = BelowGroundWt - toRootDM
Total_m_respi = spResp_m(1) + spResp_m(2) + spResp_m(3)
Root_m_respi = ToRoot * Total_m_respi
 
 
! CN ratio calculations
if surfaceom_n > 0.1 then
surface_CN_ratio = surfaceom_c / surfaceom_n
endif
 
if BelowGroundN > 0.1 then
roots_cn = BelowGroundWt*0.4/BelowGroundN
endif
 
if BelowGroundWt > 0.1 then
roots_N% = 100* BelowGroundN / BelowGroundWt
endif
 
! Check calculations for FOM cnrf
! FOM dec = amount * rate * tf * mf * cnrf
 
sot_cnr = fom_c() / (fom_n() + nit_tot())
sot_cnrf = exp(-0.677 * (sot_cnr - 25) / 25))
tf_surface_om1 = SurfaceOrganicMatter.tf
 
 
! SOC calculations
oc_5cm = 0.5 * (oc(1) + oc(2))
oc_15cm = 0.5 * (oc(3) + oc(4))
oc_30cm = 0.5 * (oc(5) + oc(6))
oc_60cm = 0.6 * oc(7) + 0.4*oc(8)
oc_100cm = 0.1* oc(8) + 0.9*oc(9)
 
 
! Soil and temperature calculations
sw_5 = (sw(1) + sw(2))*0.5
sw_10 = sw(3)
sw_15 = sw(4)
sw_35 = sw(6)
sw_75 = sw(7) ! this is 50 cm
!st_5 = (st(1) + st(2))*0.5
!st_10 = st(3)
!st_15 = st(4)
!st_35 = st(6)
!st_75 = st(7) ! this is 50 cm
st_5 = (ave_soil_temp(1) + ave_soil_temp(2))*0.5
st_10 = ave_soil_temp(3)
st_15 = ave_soil_temp(4)
st_35 = ave_soil_temp(5)
st_75 = ave_soil_temp(6)
 
 
! soil respitation
soil_co2 = dlt_biom_c_atm() + dlt_fom_c_atm() + dlt_hum_c_atm() + dlt_res_c_atm
! root respiration
! The growth component of the respiration is assumed to be accounted in the RUE value
! So only the maintenance component of the root respiration is modeled here following Teixeira et al., 2009 Crop & Pasture Science 60: 778-784
!root_co2 = toRootDM * 0.44 * 0.015 * 2.0^((st(1)-20)/10)         ! the 0.44 is to convert dry mater to C, Q10=1.8, Tref = 20.
!root_co2 = SumNewRoot * 0.44 * 0.015 * 2.0^((st(1)-20)/10))         ! the 0.44 is to convert dry mater to C, Q10=1.8, Tref = 20.
root_co2 = Root_m_respi
 
! total soil + root respiration
soil_root_co2 = soil_co2 + root_co2
!bbc_gradient = -1
 
 
!bbc_gradient = -1.0025
 
if subsurface_drain >0 then
N_conc_mgLN = 100* subsurface_drain_no3 / subsurface_drain
endif
```
        manager2 SpecialReporter
          date = 01-may  # Date for the special report
          date2 = 30-sep  # date for second one
```csharp
using System;
using ModelFramework;
using CSGeneral;
 
public class Script
{
   [Link] Paddock MyPaddock; // Can be used to dynamically get access to simulation structure and variables
   [Input] DateTime Today;   // Equates to the value of the current simulation date - value comes from CLOCK
   [Param] string date;         // The value for this will come from the Properties page.
   [Param] string date2;
 
   [Event] public event NullTypeDelegate SpecialReport;
   [Event] public event NullTypeDelegate SpecialReport2;
 
 
   // The following event handler will be called once at the beginning of the simulation
   [EventHandler] public void OnInitialised()
   {
 
   }
 
   // The following event handler will be called each day at the beginning of the day
   [EventHandler] public void OnPrepare()
   {
      if (DateUtility.DatesEqual(date, Today))
         SpecialReport.Invoke();
 
      if (DateUtility.DatesEqual(date2, Today))
         SpecialReport2.Invoke();
   }
 
}
```
        tracker
          variable:
            sum of toRootDM on end_of_day from SpecialReport to SpecialReport2 as SumNewRoot
            sum of N_deposition on end_of_day from SpecialReport to SpecialReport as MaySeptNDep
            sum of subsurface_drain on end_of_day from SpecialReport to SpecialReport as MaySeptTiles
            sum of rain on end_of_day from SpecialReport to SpecialReport as MaySeptRain
            sum of runoff on end_of_day from SpecialReport to SpecialReport as MaySeptrunoff
            sum of es on end_of_day from SpecialReport to SpecialReport as MaySepEvap
            sum of WaterUptake on end_of_day from SpecialReport to SpecialReport as MaySepTrans
            sum of dlt_n_min_tot() on end_of_day from SpecialReport to SpecialReport as MaySepNnetMin
            sum of dnit() on end_of_day from SpecialReport to SpecialReport as MaySepDenit
            sum of subsurface_drain_no3 on end_of_day from SpecialReport to SpecialReport as MaySeptTilesNO3
            sum of dlt_n_min_res() on end_of_day from SpecialReport to SpecialReport as MaySepResImmob
            sum of NitrogenUptake on end_of_day from SpecialReport to SpecialReport as MaySepNuptake
            sum of subsurface_drain on end_of_day from start_year to end_year as drainageIH
            sum of subsurface_drain_no3 on end_of_day from start_year to end_year as leaching
        operations Prairie opeartions: same as Prairies calibration dec 2015.PFnew.paddock.Manager folder.Prairie opeartions
        outputfile agwt: filename=PFnew agwt.out; title=PFnew agwt
          variables agpasture
            variables: dd/mm/yyyy as Date, AboveGroundWt, BelowGroundWt, surfaceom_wt
          events time step: event=end_day
        outputfile soilco2: filename=PFnew soilco2.out; title=PFnew soilco2
          variables agpasture: variable=dd/mm/yyyy as Date
          events time step: event=end_day
          variables add: variable=soil_root_co2
        outputfile drain: filename=PFnew drain.out; title=PFnew drain
          variables agpasture
            variables: dd/mm/yyyy as Date, drainageIH, leaching
          events time step: event=end_day
    simulation Pnew -> /simulations/Prairies calibration dec 2015/PFnew
      area paddock -> /simulations/Prairies calibration dec 2015/PFnew/paddock
        folder Manager folder -> /simulations/Prairies calibration dec 2015/PFnew/paddock/Manager folder
          operations Prairie opeartions
            6/6/2008  ryegrass_clover_paspalum sow
            10/10/2008  ryegrass_clover_paspalum graze type = 'residue', amount = 250
            12/10/2008  surfaceorganicmatter tillage type = user_defined, f_incorp = 0.10 (), tillage_depth = 0.0 ()
            10/10/2009  ryegrass_clover_paspalum graze type = 'residue', amount = 250
            12/10/2009  surfaceorganicmatter tillage type = user_defined, f_incorp = .66707100 (), tillage_depth = 0.0 ()
            10/10/2010  ryegrass_clover_paspalum graze type = 'residue', amount = 250
            12/10/2010  surfaceorganicmatter tillage type = user_defined, f_incorp = .66707100 (), tillage_depth = 0.0 ()
            10/10/2011  ryegrass_clover_paspalum graze type = 'residue', amount = 250
            12/10/2011  surfaceorganicmatter tillage type = user_defined, f_incorp = .66707100 (), tillage_depth = 0.0 ()
            10/10/2012  ryegrass_clover_paspalum graze type = 'residue', amount = 250
            12/10/2012  surfaceorganicmatter tillage type = user_defined, f_incorp = .66707100 (), tillage_depth = 0.0 ()
            10/10/2013  ryegrass_clover_paspalum graze type = 'residue', amount = 250
            12/10/2013  surfaceorganicmatter tillage type = user_defined, f_incorp = .66707100 (), tillage_depth = 0.0 ()
            10/10/2014  ryegrass_clover_paspalum graze type = 'residue', amount = 250
            12/10/2014  surfaceorganicmatter tillage type = user_defined, f_incorp = .66707100 (), tillage_depth = 0.0 ()
            10/10/2015  ryegrass_clover_paspalum graze type = 'residue', amount = 250
            12/10/2015  surfaceorganicmatter tillage type = user_defined, f_incorp = .66707100 (), tillage_depth = 0.0 ()
            10/10/2016  ryegrass_clover_paspalum graze type = 'residue', amount = 250
            12/10/2016  surfaceorganicmatter tillage type = user_defined, f_incorp = .66707100 (), tillage_depth = 0.0 ()
            10/10/2017  ryegrass_clover_paspalum graze type = 'residue', amount = 250
            12/10/2017  surfaceorganicmatter tillage type = user_defined, f_incorp = .66707100 (), tillage_depth = 0.0 ()
            10/10/2018  ryegrass_clover_paspalum graze type = 'residue', amount = 250
            12/10/2018  surfaceorganicmatter tillage type = user_defined, f_incorp = .66707100 (), tillage_depth = 0.0 ()
            10/10/2019  ryegrass_clover_paspalum graze type = 'residue', amount = 250
            12/10/2019  surfaceorganicmatter tillage type = user_defined, f_incorp = .66707100 (), tillage_depth = 0.0 ()
            10/10/2020  ryegrass_clover_paspalum graze type = 'residue', amount = 250
            12/10/2020  surfaceorganicmatter tillage type = user_defined, f_incorp = .66707100 (), tillage_depth = 0.0 ()
            10/10/2021  ryegrass_clover_paspalum graze type = 'residue', amount = 250
            12/10/2021  surfaceorganicmatter tillage type = user_defined, f_incorp = .66707100 (), tillage_depth = 0.0 ()
            10/10/2022  ryegrass_clover_paspalum graze type = 'residue', amount = 250
            12/10/2022  surfaceorganicmatter tillage type = user_defined, f_incorp = .66707100 (), tillage_depth = 0.0 ()
            10/10/2023  ryegrass_clover_paspalum graze type = 'residue', amount = 250
            12/10/2023  surfaceorganicmatter tillage type = user_defined, f_incorp = .66707100 (), tillage_depth = 0.0 ()
            10/10/2024  ryegrass_clover_paspalum graze type = 'residue', amount = 250
            12/10/2024  surfaceorganicmatter tillage type = user_defined, f_incorp = .66707100 (), tillage_depth = 0.0 ()
            10/10/2025  ryegrass_clover_paspalum graze type = 'residue', amount = 250
            12/10/2025  surfaceorganicmatter tillage type = user_defined, f_incorp = .66707100 (), tillage_depth = 0.0 ()
            10/10/2026  ryegrass_clover_paspalum graze type = 'residue', amount = 250
            12/10/2026  surfaceorganicmatter tillage type = user_defined, f_incorp = .66707100 (), tillage_depth = 0.0 ()
            10/10/2027  ryegrass_clover_paspalum graze type = 'residue', amount = 250
            12/10/2027  surfaceorganicmatter tillage type = user_defined, f_incorp = .66707100 (), tillage_depth = 0.0 ()
            10/10/2028  ryegrass_clover_paspalum graze type = 'residue', amount = 250
            12/10/2028  surfaceorganicmatter tillage type = user_defined, f_incorp = .66707100 (), tillage_depth = 0.0 ()
            10/10/2029  ryegrass_clover_paspalum graze type = 'residue', amount = 250
            12/10/2029  surfaceorganicmatter tillage type = user_defined, f_incorp = .66707100 (), tillage_depth = 0.0 ()
            10/10/2030  ryegrass_clover_paspalum graze type = 'residue', amount = 250
            12/10/2030  surfaceorganicmatter tillage type = user_defined, f_incorp = .66707100 (), tillage_depth = 0.0 ()
            10/10/2031  ryegrass_clover_paspalum graze type = 'residue', amount = 250
            12/10/2031  surfaceorganicmatter tillage type = user_defined, f_incorp = .66707100 (), tillage_depth = 0.0 ()
            10/10/2032  ryegrass_clover_paspalum graze type = 'residue', amount = 250
            12/10/2032  surfaceorganicmatter tillage type = user_defined, f_incorp = .66707100 (), tillage_depth = 0.0 ()
            10/10/2033  ryegrass_clover_paspalum graze type = 'residue', amount = 250
            12/10/2033  surfaceorganicmatter tillage type = user_defined, f_incorp = .66707100 (), tillage_depth = 0.0 ()
            10/10/2034  ryegrass_clover_paspalum graze type = 'residue', amount = 250
            12/10/2034  surfaceorganicmatter tillage type = user_defined, f_incorp = .66707100 (), tillage_depth = 0.0 ()
            10/10/2035  ryegrass_clover_paspalum graze type = 'residue', amount = 250
            12/10/2035  surfaceorganicmatter tillage type = user_defined, f_incorp = .66707100 (), tillage_depth = 0.0 ()
            10/10/2036  ryegrass_clover_paspalum graze type = 'residue', amount = 250
            12/10/2036  surfaceorganicmatter tillage type = user_defined, f_incorp = .66707100 (), tillage_depth = 0.0 ()
            10/10/2037  ryegrass_clover_paspalum graze type = 'residue', amount = 250
            12/10/2037  surfaceorganicmatter tillage type = user_defined, f_incorp = .66707100 (), tillage_depth = 0.0 ()
            10/10/2038  ryegrass_clover_paspalum graze type = 'residue', amount = 250
            12/10/2038  surfaceorganicmatter tillage type = user_defined, f_incorp = .66707100 (), tillage_depth = 0.0 ()
            10/10/2039  ryegrass_clover_paspalum graze type = 'residue', amount = 250
            12/10/2039  surfaceorganicmatter tillage type = user_defined, f_incorp = .66707100 (), tillage_depth = 0.0 ()
            10/10/2040  ryegrass_clover_paspalum graze type = 'residue', amount = 250
            12/10/2040  surfaceorganicmatter tillage type = user_defined, f_incorp = .66707100 (), tillage_depth = 0.0 ()
            10/10/2041  ryegrass_clover_paspalum graze type = 'residue', amount = 250
            12/10/2041  surfaceorganicmatter tillage type = user_defined, f_incorp = .66707100 (), tillage_depth = 0.0 ()
            10/10/2042  ryegrass_clover_paspalum graze type = 'residue', amount = 250
            12/10/2042  surfaceorganicmatter tillage type = user_defined, f_incorp = .66707100 (), tillage_depth = 0.0 ()
            10/10/2043  ryegrass_clover_paspalum graze type = 'residue', amount = 250
            12/10/2043  surfaceorganicmatter tillage type = user_defined, f_incorp = .66707100 (), tillage_depth = 0.0 ()
            10/10/2044  ryegrass_clover_paspalum graze type = 'residue', amount = 250
            12/10/2044  surfaceorganicmatter tillage type = user_defined, f_incorp = .66707100 (), tillage_depth = 0.0 ()
            10/10/2045  ryegrass_clover_paspalum graze type = 'residue', amount = 250
            12/10/2045  surfaceorganicmatter tillage type = user_defined, f_incorp = .66707100 (), tillage_depth = 0.0 ()
            10/10/2046  ryegrass_clover_paspalum graze type = 'residue', amount = 250
            12/10/2046  surfaceorganicmatter tillage type = user_defined, f_incorp = .66707100 (), tillage_depth = 0.0 ()
            10/10/2047  ryegrass_clover_paspalum graze type = 'residue', amount = 250
            12/10/2047  surfaceorganicmatter tillage type = user_defined, f_incorp = .66707100 (), tillage_depth = 0.0 ()
            10/10/2048  ryegrass_clover_paspalum graze type = 'residue', amount = 250
            12/10/2048  surfaceorganicmatter tillage type = user_defined, f_incorp = .66707100 (), tillage_depth = 0.0 ()
            10/10/2049  ryegrass_clover_paspalum graze type = 'residue', amount = 250
            12/10/2049  surfaceorganicmatter tillage type = user_defined, f_incorp = .66707100 (), tillage_depth = 0.0 ()
            10/10/2050  ryegrass_clover_paspalum graze type = 'residue', amount = 250
            12/10/2050  surfaceorganicmatter tillage type = user_defined, f_incorp = .66707100 (), tillage_depth = 0.0 ()
            10/10/2051  ryegrass_clover_paspalum graze type = 'residue', amount = 250
            12/10/2051  surfaceorganicmatter tillage type = user_defined, f_incorp = .66707100 (), tillage_depth = 0.0 ()
            10/10/2052  ryegrass_clover_paspalum graze type = 'residue', amount = 250
            12/10/2052  surfaceorganicmatter tillage type = user_defined, f_incorp = .66707100 (), tillage_depth = 0.0 ()
            10/10/2053  ryegrass_clover_paspalum graze type = 'residue', amount = 250
            12/10/2053  surfaceorganicmatter tillage type = user_defined, f_incorp = .66707100 (), tillage_depth = 0.0 ()
            10/10/2054  ryegrass_clover_paspalum graze type = 'residue', amount = 250
            12/10/2054  surfaceorganicmatter tillage type = user_defined, f_incorp = .66707100 (), tillage_depth = 0.0 ()
            10/10/2055  ryegrass_clover_paspalum graze type = 'residue', amount = 250
            12/10/2055  surfaceorganicmatter tillage type = user_defined, f_incorp = .66707100 (), tillage_depth = 0.0 ()
            10/10/2056  ryegrass_clover_paspalum graze type = 'residue', amount = 250
            12/10/2056  surfaceorganicmatter tillage type = user_defined, f_incorp = .66707100 (), tillage_depth = 0.0 ()
            10/10/2057  ryegrass_clover_paspalum graze type = 'residue', amount = 250
            12/10/2057  surfaceorganicmatter tillage type = user_defined, f_incorp = .66707100 (), tillage_depth = 0.0 ()
            10/10/2058  ryegrass_clover_paspalum graze type = 'residue', amount = 250
            12/10/2058  surfaceorganicmatter tillage type = user_defined, f_incorp = .66707100 (), tillage_depth = 0.0 ()
            10/10/2059  ryegrass_clover_paspalum graze type = 'residue', amount = 250
            12/10/2059  surfaceorganicmatter tillage type = user_defined, f_incorp = .66707100 (), tillage_depth = 0.0 ()
            10/10/2060  ryegrass_clover_paspalum graze type = 'residue', amount = 250
            12/10/2060  surfaceorganicmatter tillage type = user_defined, f_incorp = .66707100 (), tillage_depth = 0.0 ()
            10/10/2061  ryegrass_clover_paspalum graze type = 'residue', amount = 250
            12/10/2061  surfaceorganicmatter tillage type = user_defined, f_incorp = .66707100 (), tillage_depth = 0.0 ()
            10/10/2062  ryegrass_clover_paspalum graze type = 'residue', amount = 250
            12/10/2062  surfaceorganicmatter tillage type = user_defined, f_incorp = .66707100 (), tillage_depth = 0.0 ()
            10/10/2063  ryegrass_clover_paspalum graze type = 'residue', amount = 250
            12/10/2063  surfaceorganicmatter tillage type = user_defined, f_incorp = .66707100 (), tillage_depth = 0.0 ()
            10/10/2064  ryegrass_clover_paspalum graze type = 'residue', amount = 250
            12/10/2064  surfaceorganicmatter tillage type = user_defined, f_incorp = .66707100 (), tillage_depth = 0.0 ()
        outputfile -> /simulations/Prairies calibration dec 2015/PFnew/paddock/outputfile: filename=Pnew.out; title=Pnew
          variables agpasture -> /simulations/Prairies calibration dec 2015/PFnew/paddock/outputfile/agpasture
          variables soil -> /simulations/Prairies calibration dec 2015/PFnew/paddock/outputfile/soil
          variables add -> /simulations/Prairies calibration dec 2015/PFnew/paddock/outputfile/add
          events time step -> /simulations/Prairies calibration dec 2015/PFnew/paddock/outputfile/time step
        AgPasture ryegrass_clover_paspalum
          Nspecies = 3  # Number of species
          thisCropName = ryegrass_clover_paspalum  # Crop name shown as on the simulation tree
          cropName = ryegrass whiteclover paspalum  # Species names
          micrometType = grass     grass    grass  # crop type for MicroMet
          isAnnual = 0           0          0  # Annual species? no=0, yes=1
          isLegume = 0           0          0  # Legume species? no=0, yes=1
          photoPath = 3           4          3  # C3 or C4 species? C3=3, C4=4
          rootDepth = 1200 1200 1100
          rlvp = 1  1  1  # Root distribution parameter ([0-1] relative to Root depth)
          growthTmin = 3.6455928E+00     3.1664609E+00     4.0000000E-01  # Minimum temperature for growth
          growthTmax = 3.6000000E+01     4.5000000E+01     4.1000000E+01  # Maximum temperature for growth
          growthTopt = 2.2500000E+01     2.2802369E+01     2.8543513E+01  # Optimum temperature for growth
          growthTq = 1.5       1.5        1.5  # Curvture of growth response to temperature
          massFluxTmin = 5           5          5  # Minimum temperature for mass flux
          massFluxTopt = 20        20         20  # Optimum temperature for mass flux
          massFluxW0 = 2          2           2  # Scale factor for response of mass flux to soil moisture
          massFluxWopt = 0.5       0.5        0.5  # Optimum soil moisture for mass flux
          heatOnsetT = 38.390269406        38.000000000         35.481849730  # Heat effects- Onset temperature
          heatFullT = 40.983371573        46.000000000         41.272191134  # Heat effects- Full temperature
          heatSumT = 36.939310938          33.000000000         35.948772898  # Heat effects- Temperature sum for recovery
          coldOnsetT = 2.6150056756         3.1606047652         4.0000000000  # Cold effects- Onset temperature
          coldFullT = -.9914351598          -1.007263686         -.9997215961  # Cold effects- Full temperature
          coldSumT = 20         20        20  # Cold effects- Temperature sum for recovery
          Pm = 1.5138558E+00     1.6493120E+00    1.5039454E+00  # Reference CO2 assimilation rate (mg CO2/m2.s)
          maintRespiration = 1.9500000E+00  2.1298923E+00    2.6073932E+00  # Maintenance respiration coefficient (%)
          growthEfficiency = 8.7758981E-01    7.0000000E-01     7.0000000E-01
          SLA = 20       20         20  # Specific leaf area
          lightExtCoeff = .53674137831   .37972078054    .48276262769  # Light extinction coefficient
          stockParameter = 0.05     0.05      0.05  # Stock influence parameter
          maxRootFraction = .34335154384   .42005615228     .41239561524  # Maximum biomass fraction allocated to root
          leafRate = 3.5         3.5           3.5  # Reference leaf appearance rate without stress
          fLeaf = .53808649546    .61061766662    .70000000000  # Reference growth partition to leaves
          fStolon = 0.2          0           0  # Reference growth partition to stolon
          digestLive = 0.9       0.9        0.9  # Digestibility of live plant material
          digestDead = 0.9       0.9       0.9  # Digestibility of dead plant material
          dmtotal = 50    50       50  # Initial shoot dry matter (kg/ha)
          dmlitter = 50      50          50  # Initial litter dry matter (kg/ha)
          dmgreenmin = 50      50         50  # Minimum green dry matter (kg/ha)
          NcleafOpt = 2.8539131718    2.4000000000    3.0000000000  # N concentration - leaf optimum
          NcleafMax = 2.7089815314    3.3297088084    3.7366629996  # N concentration - leaf luxary
          NcleafMin = .76723199764    .65000000000    .65000000000  # N concentration - leaf scenescent
          NcstemFr = 5.0860278E-01   4.8365882E-01     .50234340956  # Stem N concentration as fraction of leaf N concentration
          NcstolFr = 0.4         0         0  # Stolon N concentration as fraction of leaf N concentration
          NcrootFr = .44308765510      .49056422305     .44988344081  # Root N concentration as fraction of leaf N concentration
          NMinFix = .1       0       0  # Minimum N fixation (when soil N is sufficient)
          NMaxFix = .6       0       0  # Maximum N fixation (when soil N is unavailable)
          CO2PmaxScale = 700     700       700  # CO2 - Scale factor for CO2 effect on photosynthesis
          CO2NScale = 600     600       600  # CO2 - Scale factor for CO2 effects on plant N concentration
          CO2NMin = 0.7      0.7        0.7  # CO2 - Minimum fraction that plant N concentration may reduce to uder elevated CO2
          CO2NCurvature = 2         2           2  # CO2 - Curvature factor of CO2 effect on plant N concentration
          Frgr = 1         1           1  # Relative growth factor
          WaterUptakeSource = apsim  # Water uptake done by AgPasture (calc) or by apsim?
          waterStressFactor = 0.5 0.5 0.5  # Scale factor of water stress on plant growth [0-1]
          rateLive2Dead = .02370481602  .02103293450 .02864225675
          rateDead2Litter = .08698084441 .07980521432 .08639544340
          rateRootSen = .00625115072 .00951677664 .00694292939
          waterStressFactor = 0.1 0.1 0.1  # water stress
        outputfile agwt: filename=Pnew agwt.out; title=Pnew agwt
          variables agpasture
            variables: dd/mm/yyyy as Date, AboveGroundWt, BelowGroundWt, surfaceom_wt
          events time step: event=end_day
        outputfile soilco2: filename=Pnew soilco2.out; title=Pnew soilco2
          variables agpasture: variable=dd/mm/yyyy as Date
          events time step: event=end_day
          variables add: variable=soil_root_co2
        outputfile drain: filename=Pnew drain.out; title=Pnew drain
          variables agpasture
            variables: dd/mm/yyyy as Date, drainageIH, leaching
          events time step: event=end_day
    memo Below Figs with measured data
      below are figures with measured data

       to-do (sept 2015)
      1. update met file--ok
      2. update soil--ok, biom-intert partitioning, dul/ll/sat/ksat the same and tile drainage parms the same. Works ok, a bit higher yields because of higher OM. to check KL because is very high.
      3. decrease opt temp from 32 to 28-ok works but i had to take the other soil.xml from the recombiled version. same change, all ok. a bit hgher yields as expected.
      4. use soil temp 2-ok, yields restored to previous level, look ok now.
      5. use N deposition-ok, works well.
      6. update measured files
      7. update management dates of residue removal
      8. is the biomass data green/live or total including dead
      9. definition of surface om measurement

       to-do, round 2:
      1. check W and N balance, looks ok except the N upatke whihc is high, the problem comes from N dillution paterns, also to improve tile drainage
      2. improve calibration

      fertilize praire used for sensitivity

      management
      ---------------------
      ** ryegrass_clover_paspalum graze type = 'residue', amount = 175 (from 250) - affect the biomass (to lower/equal), surfac wt substantally, when set to 400 biomass increased/equal. i like the 175, can be year specific also to match surface om, right now is constant.
      ** surfaceorganicmatter tillage type = user_defined, f_incorp = 0.40 (from 0.8) - affect surface om, not the biomass, to consider also

      water
      ------------
      decrease KL by (value * 0.8)  along the profile-- no effect nowhere, so we should keep this set of params as the make more sense
      XF to zero for the last 2 layer had no effect anywhere, no need to change
      bbc grad from -1 to -1.03 works well, tiles drainage issue solved.

      crop
      -------------
      base or opt temp less impact, not much of a response
      Heat effects- Onset temperature	32        34         32 --> (-4 from what we have now) work very well and have huge impact and improved everything!
      Cold effects- Onset temperature	5.8         5.5         7.0--> (+3 from default) has some impact but i prefer the default
      specific leaf area from 20 to 15 --> SWIM failed, 20 to 18 --> SWIM failed again, do not chnage this param, too much sensitive
      Light extinction coefficient	0.35 (from 0.5)     0.45 (from 0.3)      0.42 (same) --> yes we have changes everywhere, but better keep that at default. note the species 1 dm went up while i decreased the kc and the overal biomass,
      Light extinction coefficient	0.75 (from 0.5)     0.30 (same)      0.42 (same) --> yes we have changes everywhere. note the species 1 dm went down while i increased the kc and the species 2 became the dominant,
      Reference growth partition to leaves	0.4  (from 0.5)     0.5 (from 0.6)        0.4 (from 0.6)--> LAI decreased to more acceptable levels, biomass almost the same, N% the same, species distribution chnage as well. i like that
      Reference CO2 assimilation rate (mg CO2/m2.s)	1.4 (from 1.6)        1.65 (from 1.85)          1.53 (same)--> not much effect on biomass or LAI, i like that.
      Growth efficiency	0.72 (from 0.82)      0.75 (from 0.85)    0.75 (from 0.85)--> little lower biomass, lower LAI, i like that change. the default growth effiency in all models is 0.75 or 0.7.
      Maintenance respiration coefficient (%)	2.55(from 1.95)          2.50(from 1.9)        2.55 (from 1.95)--> huge impact (lower biomass), but swim failed in 2013.
      Maintenance respiration coefficient (%)	2.15(from 1.95)          2.10(from 1.9)        2.15 (from 1.95)--> huge impact (lower biomass), i like that. The default in models is around 2 to 3%.
      Maximum biomass fraction allocated to root	0.4  (from 0.3 in all species) --> huge impact (lower biomass, higher roots), not good results.
      Reference leaf appearance rate without stress	2.5 (from 0.35 in all species) --> none effect.
      N concentration - leaf scenescent	0.5   (from 0.65 in all species) --> suprisingly not effect, but in the unfert. p should have a huge effect.
      rate live 2 dead	0.05 (from 0.02 in all species)--> sim failed. senescence is occuring very fast
      rate live 2 dead	0.01 (from 0.02 in all species)--> higher biomass because senence is occuring slower. big impact on surface wt. So this param is to be changes by a little if needed.
      rate dead 2 litter	0.04 (from 0.08 in all species)-->not much of an effect.
      rate dead 2 litter	0.04 (from 0.08 in all species)-->not much of an effect.
      rate root sen	0.02 (from 0.008 in all species)--> a bit lower biomass and root but for the root it improved the fit to data. roots decomp faster, more N to the system or more N needed?
      water stress	0.5  (from 0.1 in all species) --> sim failed in the dry year.
      water stress	0.2  (from 0.1 in all species) --> a little lower biomass in the dry year. i like that, because if we are to increase ground water table influence to get tile drainage right, perhaps this is the way to adjust biomass.

      source code
      --------------------
      The cure was the addition of a single number "2" in the source code/equation: dNrootSen = 2 * (Ncroot * dRootSen - NrootRemob). Note that right now the value is 3.5, why i do not know.

      what needs to be done
      -----------------------------------------
      1. between P and PF the params should be the same, right now they differ in: a) light extinction, b) max C allocation to roots and c) min N conc. The b is the most important. To solve that we have to fix a bug in the code that Val admitted (the root/shoot function is not working as it should). We can fix that either emprirically (change max c allocation as a function of Nitrogen - to be added in the source code by Isaiah) or mechanistically by improving the existing algorithm. Done from my end, Isaiah needs to add some code in the source code (see excel).
      2. table with param values splited in various categories  - done (see excel file)
      3. we first fix tile drainage/NO3 load and then we move to the crop calibration
      4. manual re-calibration of some parameters
      5. PEST help to finilize estimates (not all, just some parameters). We will put emphasis on crop aspects (biomass and root and CO2) and not soil water/temp data. Isaiah make a list of what we do not know well (pest assumptions/defaults/weighting, to ask Rob Malone).
      6. run a sensible analysis, to see how stable the praire model is (different levels of N and/or climate files and/or management (residue removal)). To me this is the most IMPORTANT part.
      7. output/calculate WUE and NUE for the study period and provide a complete a W/N balance - already done this so as long as we have the new results it should be very easy.
      8. figures and results writting.
  folder Prairies calibration sep 2016
    simulation fertil
      metfile met: filename=Cobs.Dec31.2016.met
      clock
        start_date = 26/07/2008  # Enter the start date of the simulation
        end_date = 11/11/2014  # Enter the end date of the simulation
      summaryfile
      area paddock
        fertiliser
        folder Manager folder
          operations Prairie opeartions
            24/6/2008  ryegrass_clover_paspalum sow
            1/10/2008  ryegrass_clover_paspalum graze type = 'SetResidueAmount', amount = 250
            2/10/2008  surfaceorganicmatter tillage type = user_defined, f_incorp = 0.10 (), tillage_depth = 0.0 ()
            10/10/2009  ryegrass_clover_paspalum graze type = 'SetResidueAmount', amount = 250
            12/10/2009  surfaceorganicmatter tillage type = user_defined, f_incorp = 0.55 (), tillage_depth = 0.0 ()
            10/10/2010  ryegrass_clover_paspalum graze type = 'SetResidueAmount', amount = 250
            12/10/2010  surfaceorganicmatter tillage type = user_defined, f_incorp = .5055922601 (), tillage_depth = 0.0 ()
            10/10/2011  ryegrass_clover_paspalum graze type = 'SetResidueAmount', amount = 250
            12/10/2011  surfaceorganicmatter tillage type = user_defined, f_incorp = .5055922601 (), tillage_depth = 0.0 ()
            10/10/2012  ryegrass_clover_paspalum graze type = 'SetResidueAmount', amount = 250
            12/10/2012  surfaceorganicmatter tillage type = user_defined, f_incorp = .5055922601 (), tillage_depth = 0.0 ()
            10/10/2013  ryegrass_clover_paspalum graze type = 'SetResidueAmount', amount = 250
            12/10/2013  surfaceorganicmatter tillage type = user_defined, f_incorp = .5055922601 (), tillage_depth = 0.0 ()
            10/10/2014  ryegrass_clover_paspalum graze type = 'SetResidueAmount', amount = 250
            12/10/2014  surfaceorganicmatter tillage type = user_defined, f_incorp = .5055922601 (), tillage_depth = 0.0 ()
            10/10/2015  ryegrass_clover_paspalum graze type = 'SetResidueAmount', amount = 250
            12/10/2015  surfaceorganicmatter tillage type = user_defined, f_incorp = .5055922601 (), tillage_depth = 0.0 ()
            10/10/2016  ryegrass_clover_paspalum graze type = 'SetResidueAmount', amount = 250
            12/10/2016  surfaceorganicmatter tillage type = user_defined, f_incorp = .5055922601 (), tillage_depth = 0.0 ()
            10/10/2017  ryegrass_clover_paspalum graze type = 'SetResidueAmount', amount = 250
            12/10/2017  surfaceorganicmatter tillage type = user_defined, f_incorp = .555922601 (), tillage_depth = 0.0 ()
            10/10/2018  ryegrass_clover_paspalum graze type = 'SetResidueAmount', amount = 250
            12/10/2018  surfaceorganicmatter tillage type = user_defined, f_incorp = .555922601 (), tillage_depth = 0.0 ()
            10/10/2019  ryegrass_clover_paspalum graze type = 'SetResidueAmount', amount = 250
            12/10/2019  surfaceorganicmatter tillage type = user_defined, f_incorp = .555922601 (), tillage_depth = 0.0 ()
            10/10/2020  ryegrass_clover_paspalum graze type = 'SetResidueAmount', amount = 250
            12/10/2020  surfaceorganicmatter tillage type = user_defined, f_incorp = .555922601 (), tillage_depth = 0.0 ()
            10/10/2021  ryegrass_clover_paspalum graze type = 'SetResidueAmount', amount = 250
            12/10/2021  surfaceorganicmatter tillage type = user_defined, f_incorp = .555922601 (), tillage_depth = 0.0 ()
            10/10/2022  ryegrass_clover_paspalum graze type = 'SetResidueAmount', amount = 250
            12/10/2022  surfaceorganicmatter tillage type = user_defined, f_incorp = .555922601 (), tillage_depth = 0.0 ()
            10/10/2023  ryegrass_clover_paspalum graze type = 'SetResidueAmount', amount = 250
            12/10/2023  surfaceorganicmatter tillage type = user_defined, f_incorp = .555922601 (), tillage_depth = 0.0 ()
            10/10/2024  ryegrass_clover_paspalum graze type = 'SetResidueAmount', amount = 250
            12/10/2024  surfaceorganicmatter tillage type = user_defined, f_incorp = .555922601 (), tillage_depth = 0.0 ()
            10/10/2025  ryegrass_clover_paspalum graze type = 'SetResidueAmount', amount = 250
            12/10/2025  surfaceorganicmatter tillage type = user_defined, f_incorp = .66707100 (), tillage_depth = 0.0 ()
            10/10/2026  ryegrass_clover_paspalum graze type = 'SetResidueAmount', amount = 250
            12/10/2026  surfaceorganicmatter tillage type = user_defined, f_incorp = .66707100 (), tillage_depth = 0.0 ()
            10/10/2027  ryegrass_clover_paspalum graze type = 'SetResidueAmount', amount = 250
            12/10/2027  surfaceorganicmatter tillage type = user_defined, f_incorp = .66707100 (), tillage_depth = 0.0 ()
            10/10/2028  ryegrass_clover_paspalum graze type = 'SetResidueAmount', amount = 250
            12/10/2028  surfaceorganicmatter tillage type = user_defined, f_incorp = .66707100 (), tillage_depth = 0.0 ()
            10/10/2029  ryegrass_clover_paspalum graze type = 'SetResidueAmount', amount = 250
            12/10/2029  surfaceorganicmatter tillage type = user_defined, f_incorp = .66707100 (), tillage_depth = 0.0 ()
            10/10/2030  ryegrass_clover_paspalum graze type = 'SetResidueAmount', amount = 250
            12/10/2030  surfaceorganicmatter tillage type = user_defined, f_incorp = .66707100 (), tillage_depth = 0.0 ()
            10/10/2031  ryegrass_clover_paspalum graze type = 'SetResidueAmount', amount = 250
            12/10/2031  surfaceorganicmatter tillage type = user_defined, f_incorp = .66707100 (), tillage_depth = 0.0 ()
            10/10/2032  ryegrass_clover_paspalum graze type = 'SetResidueAmount', amount = 250
            12/10/2032  surfaceorganicmatter tillage type = user_defined, f_incorp = .66707100 (), tillage_depth = 0.0 ()
            10/10/2033  ryegrass_clover_paspalum graze type = 'SetResidueAmount', amount = 250
            12/10/2033  surfaceorganicmatter tillage type = user_defined, f_incorp = .66707100 (), tillage_depth = 0.0 ()
            10/10/2034  ryegrass_clover_paspalum graze type = 'SetResidueAmount', amount = 250
            12/10/2034  surfaceorganicmatter tillage type = user_defined, f_incorp = .66707100 (), tillage_depth = 0.0 ()
            10/10/2035  ryegrass_clover_paspalum graze type = 'SetResidueAmount', amount = 250
            12/10/2035  surfaceorganicmatter tillage type = user_defined, f_incorp = .66707100 (), tillage_depth = 0.0 ()
            10/10/2036  ryegrass_clover_paspalum graze type = 'SetResidueAmount', amount = 250
            12/10/2036  surfaceorganicmatter tillage type = user_defined, f_incorp = .66707100 (), tillage_depth = 0.0 ()
            10/10/2037  ryegrass_clover_paspalum graze type = 'SetResidueAmount', amount = 250
            12/10/2037  surfaceorganicmatter tillage type = user_defined, f_incorp = .66707100 (), tillage_depth = 0.0 ()
            10/10/2038  ryegrass_clover_paspalum graze type = 'SetResidueAmount', amount = 250
            12/10/2038  surfaceorganicmatter tillage type = user_defined, f_incorp = .66707100 (), tillage_depth = 0.0 ()
            10/10/2039  ryegrass_clover_paspalum graze type = 'SetResidueAmount', amount = 250
            12/10/2039  surfaceorganicmatter tillage type = user_defined, f_incorp = .66707100 (), tillage_depth = 0.0 ()
            10/10/2040  ryegrass_clover_paspalum graze type = 'SetResidueAmount', amount = 250
            12/10/2040  surfaceorganicmatter tillage type = user_defined, f_incorp = .66707100 (), tillage_depth = 0.0 ()
            10/10/2041  ryegrass_clover_paspalum graze type = 'SetResidueAmount', amount = 250
            12/10/2041  surfaceorganicmatter tillage type = user_defined, f_incorp = .66707100 (), tillage_depth = 0.0 ()
            10/10/2042  ryegrass_clover_paspalum graze type = 'SetResidueAmount', amount = 250
            12/10/2042  surfaceorganicmatter tillage type = user_defined, f_incorp = .66707100 (), tillage_depth = 0.0 ()
            10/10/2043  ryegrass_clover_paspalum graze type = 'SetResidueAmount', amount = 250
            12/10/2043  surfaceorganicmatter tillage type = user_defined, f_incorp = .66707100 (), tillage_depth = 0.0 ()
            10/10/2044  ryegrass_clover_paspalum graze type = 'SetResidueAmount', amount = 250
            12/10/2044  surfaceorganicmatter tillage type = user_defined, f_incorp = .66707100 (), tillage_depth = 0.0 ()
            10/10/2045  ryegrass_clover_paspalum graze type = 'SetResidueAmount', amount = 250
            12/10/2045  surfaceorganicmatter tillage type = user_defined, f_incorp = .66707100 (), tillage_depth = 0.0 ()
            10/10/2046  ryegrass_clover_paspalum graze type = 'SetResidueAmount', amount = 250
            12/10/2046  surfaceorganicmatter tillage type = user_defined, f_incorp = .66707100 (), tillage_depth = 0.0 ()
            10/10/2047  ryegrass_clover_paspalum graze type = 'SetResidueAmount', amount = 250
            12/10/2047  surfaceorganicmatter tillage type = user_defined, f_incorp = .66707100 (), tillage_depth = 0.0 ()
            10/10/2048  ryegrass_clover_paspalum graze type = 'SetResidueAmount', amount = 250
            12/10/2048  surfaceorganicmatter tillage type = user_defined, f_incorp = .66707100 (), tillage_depth = 0.0 ()
            10/10/2049  ryegrass_clover_paspalum graze type = 'SetResidueAmount', amount = 250
            12/10/2049  surfaceorganicmatter tillage type = user_defined, f_incorp = .66707100 (), tillage_depth = 0.0 ()
            10/10/2050  ryegrass_clover_paspalum graze type = 'SetResidueAmount', amount = 250
            12/10/2050  surfaceorganicmatter tillage type = user_defined, f_incorp = .66707100 (), tillage_depth = 0.0 ()
            10/10/2051  ryegrass_clover_paspalum graze type = 'SetResidueAmount', amount = 250
            12/10/2051  surfaceorganicmatter tillage type = user_defined, f_incorp = .66707100 (), tillage_depth = 0.0 ()
            10/10/2052  ryegrass_clover_paspalum graze type = 'SetResidueAmount', amount = 250
            12/10/2052  surfaceorganicmatter tillage type = user_defined, f_incorp = .66707100 (), tillage_depth = 0.0 ()
            10/10/2053  ryegrass_clover_paspalum graze type = 'SetResidueAmount', amount = 250
            12/10/2053  surfaceorganicmatter tillage type = user_defined, f_incorp = .66707100 (), tillage_depth = 0.0 ()
            10/10/2054  ryegrass_clover_paspalum graze type = 'SetResidueAmount', amount = 250
            12/10/2054  surfaceorganicmatter tillage type = user_defined, f_incorp = .66707100 (), tillage_depth = 0.0 ()
            10/10/2055  ryegrass_clover_paspalum graze type = 'SetResidueAmount', amount = 250
            12/10/2055  surfaceorganicmatter tillage type = user_defined, f_incorp = .66707100 (), tillage_depth = 0.0 ()
            10/10/2056  ryegrass_clover_paspalum graze type = 'SetResidueAmount', amount = 250
            12/10/2056  surfaceorganicmatter tillage type = user_defined, f_incorp = .66707100 (), tillage_depth = 0.0 ()
            10/10/2057  ryegrass_clover_paspalum graze type = 'SetResidueAmount', amount = 250
            12/10/2057  surfaceorganicmatter tillage type = user_defined, f_incorp = .66707100 (), tillage_depth = 0.0 ()
            10/10/2058  ryegrass_clover_paspalum graze type = 'SetResidueAmount', amount = 250
            12/10/2058  surfaceorganicmatter tillage type = user_defined, f_incorp = .66707100 (), tillage_depth = 0.0 ()
            10/10/2059  ryegrass_clover_paspalum graze type = 'SetResidueAmount', amount = 250
            12/10/2059  surfaceorganicmatter tillage type = user_defined, f_incorp = .66707100 (), tillage_depth = 0.0 ()
            10/10/2060  ryegrass_clover_paspalum graze type = 'SetResidueAmount', amount = 250
            12/10/2060  surfaceorganicmatter tillage type = user_defined, f_incorp = .66707100 (), tillage_depth = 0.0 ()
            10/10/2061  ryegrass_clover_paspalum graze type = 'SetResidueAmount', amount = 250
            12/10/2061  surfaceorganicmatter tillage type = user_defined, f_incorp = .66707100 (), tillage_depth = 0.0 ()
            10/10/2062  ryegrass_clover_paspalum graze type = 'SetResidueAmount', amount = 250
            12/10/2062  surfaceorganicmatter tillage type = user_defined, f_incorp = .66707100 (), tillage_depth = 0.0 ()
            10/10/2063  ryegrass_clover_paspalum graze type = 'SetResidueAmount', amount = 250
            12/10/2063  surfaceorganicmatter tillage type = user_defined, f_incorp = .66707100 (), tillage_depth = 0.0 ()
            10/10/2064  ryegrass_clover_paspalum graze type = 'SetResidueAmount', amount = 250
            12/10/2064  surfaceorganicmatter tillage type = user_defined, f_incorp = .66707100 (), tillage_depth = 0.0 ()
          manager N Deposition: same as Prairies calibration dec 2015.PFnew.paddock.Manager folder.N Deposition
          operations Prairie N fertil
            17/4/2009  fertiliser apply  amount = 84 (kg/ha), depth = 5 (mm), type = no3_n
            29/3/2010  fertiliser apply  amount = 84 (kg/ha), depth = 5 (mm), type = no3_n
            11/4/2011  fertiliser apply  amount = 84 (kg/ha), depth = 5 (mm), type = no3_n
            18/3/2012  fertiliser apply  amount = 84 (kg/ha), depth = 5 (mm), type = no3_n
            26/4/2013  fertiliser apply  amount = 84 (kg/ha), depth = 5 (mm), type = no3_n
            17/4/2014  fertiliser apply  amount = 84 (kg/ha), depth = 5 (mm), type = no3_n
            17/4/2015  fertiliser apply  amount = 84 (kg/ha), depth = 5 (mm), type = no3_n
            17/4/2016  fertiliser apply  amount = 84 (kg/ha), depth = 5 (mm), type = no3_n
            17/4/2017  fertiliser apply  amount = 84 (kg/ha), depth = 5 (mm), type = no3_n
            17/4/2018  fertiliser apply  amount = 84 (kg/ha), depth = 5 (mm), type = no3_n
            17/4/2019  fertiliser apply  amount = 84 (kg/ha), depth = 5 (mm), type = no3_n
            17/4/2020  fertiliser apply  amount = 84 (kg/ha), depth = 5 (mm), type = no3_n
            17/4/2021  fertiliser apply  amount = 84 (kg/ha), depth = 5 (mm), type = no3_n
            17/4/2022  fertiliser apply  amount = 84 (kg/ha), depth = 5 (mm), type = no3_n
            17/4/2023  fertiliser apply  amount = 84 (kg/ha), depth = 5 (mm), type = no3_n
            17/4/2024  fertiliser apply  amount = 84 (kg/ha), depth = 5 (mm), type = no3_n
            17/4/2025  fertiliser apply  amount = 84 (kg/ha), depth = 5 (mm), type = no3_n
        micromet: soilalbedo=0.23; a_interception=0.0; b_interception=0.0; c_interception=0.0; d_interception=0.0
        surfaceom SurfaceOrganicMatter
          PoolName = soybean  # Organic Matter pool name
          type = soybean  # Organic Matter type
          mass = 250  # Initial surface residue (kg/ha)
          cnr = 20  # C:N ratio of initial residue
          standing_fraction = 0  # Fraction of residue standing
        outputfile: filename=fertil.out; title=fertil
          variables agpasture
            variables: dd/mm/yyyy as Date, PlantPotentialGrowthWt, AboveGroundWt, BelowGroundWt, AboveGroundNPct, BelowGroundN, SpeciesLiveWt, SpeciesTotalWt, HarvestWt, AboveGroundLiveN, AboveGroundDeadN, watertable, dm1, dm2, dm3, FVPD, GLFn, GLFnConcentration, GLFrgr, GLFtemp, GLFwater, GrossGrowthWt, HarvestWt, HarvestN, Height, LAI_dead, LAI_green, LAI_total, LeafLiveWt, LeafWt, NitrogenSupply, NitrogenUptake, NitrogenUptakeLayers, PlantPotentialGrowthWt, SpeciesGreenLAI, SpeciesLiveWt, spPgross, spResp_m, spGFN, StemLiveWt, StemWt, ToRoot, ToRootDM, WaterSupply, WaterUptake, WaterUptakeLayers, Root_g_respi, Root_m_respi, dlayer, biom_respi, fom_respi, hum_respi, resid_respi, soil_co2, root_co2, soil_root_co2
          variables soil
            variables: OC_20cm, OC_90cm, OC_180cm, n2o_atm(), nitrification(), dnit(), MaySeptNDep, MaySeptTiles, MaySeptRain, MaySeptrunoff, MaySepEvap, MaySepTrans, MaySepNnetMin, MaySepDenit, MaySeptTilesNO3, MaySepResImmob, MaySepNuptake, drainageIH, leaching, fom_c, fom_n, biom_c, rlv, rlv()
          variables add
            variables: biom_c(), surfaceom_c, fom_c(), hum_c(), surfaceom_wt, AboveGroundDeadWt, C_remob, LeafDeadWt, LitterDepositionWt, RootSenescenceWt, wf, surfaceom_n, surfaceom_cover, surface_CN_ratio, no3(), nh4(), tf_surface_om1, es, eos, Cover_green, dlt_n_min_tot(), dlt_n_min(), dlt_n_min_res(), PlantFixedN, NitrogenDemand, NitrogenSupply, NitrogenUptake, PlantRemobilisedN, lai, LAI_green, LAI_dead, dlt_fom_c_atm(), dlt_fom_c_biom(), dlt_fom_c_hum(), dlt_fom_c_pool1(), dlt_fom_c_pool2(), dlt_fom_c_pool3(), dlt_fom_n_min(), dlt_res_c_biom(), dlt_res_c_hum(), HarvestN, HerbageDigestibility, RootSenescenceN, roots_cn, Remaining_Wt, Surface_sot, fom_n(), nit_tot(), sot_cnr, sot_cnrf, roots_N%, oc_5cm, oc_15cm, oc_30cm, oc_60cm, oc_100cm, IntRadn, soil_co2, root_co2, soil_root_co2, sw_5, sw_10, sw_15, sw_35, sw_75, st_5, st_10, st_15, st_35, st_75, subsurface_drain, GLFwater, GLFtemp, GLFn, ToRoot, ToRootDM, sotiris, fom_cn, year, subsurface_drain_no3, N_conc_mgLN, drain
          events time step: event=end_day
        manager unit convertor
          on init:
```
! sotiris
 
 
!surfaceom_cover = 0.1
```
          on start_of_day:
```
sotiris = BelowGroundWt + fom_c()/0.4
fom_cn = fom_c() / fom_n()
 
 
! CN ratio calculations
if surfaceom_n > 0.1 then
surface_CN_ratio = surfaceom_c / surfaceom_n
endif
 
if BelowGroundN > 0.1 then
roots_cn = BelowGroundWt*0.4/BelowGroundN
endif
 
if BelowGroundWt > 0.1 then
roots_N% = 100* BelowGroundN / BelowGroundWt
endif
 
! Check calculations for FOM cnrf
! FOM dec = amount * rate * tf * mf * cnrf
 
sot_cnr = fom_c() / (fom_n() + nit_tot())
sot_cnrf = exp(-0.677 * (sot_cnr - 25) / 25))
tf_surface_om1 = SurfaceOrganicMatter.tf
 
 
! SOC calculations
oc_5cm = 0.5 * (oc(1) + oc(2))
oc_15cm = 0.5 * (oc(3) + oc(4))
oc_30cm = 0.5 * (oc(5) + oc(6))
oc_60cm = 0.6 * oc(7) + 0.4*oc(8)
oc_100cm = 0.1* oc(8) + 0.9*oc(9)
 
 
! Soil and temperature calculations
sw_5 = (sw(1) + sw(2))*0.5
sw_10 = sw(3)
sw_15 = sw(4)
sw_35 = sw(6)
sw_75 = sw(7) ! this is 50 cm
!st_5 = (st(1) + st(2))*0.5
!st_10 = st(3)
!st_15 = st(4)
!st_35 = st(6)
!st_75 = st(7) ! this is 50 cm
st_5 = (ave_soil_temp(1) + ave_soil_temp(2))*0.5
st_10 = ave_soil_temp(3)
st_15 = ave_soil_temp(4)
st_35 = ave_soil_temp(5)
st_75 = ave_soil_temp(6)
 
! root respiration
Total_m_respi = spResp_m(1) + spResp_m(2) + spResp_m(3)  ! kg C/ha total main. respiration
Root_m_respi = ToRoot * Total_m_respi                    ! kg C/ha root main. respiration
Total_Pgross = spPgross(1) + spPgross(2) + spPgross(3)   ! kg C/ha total gross growth
Root_g_respi = Total_Pgross * (1- 0.8) * ToRoot          ! kg C/ha  root growth respiration, the 0.8 is the growth efficiency (user, defualt 0.75)   
Root_respi = Root_g_respi + Root_m_respi 
 
! soil respitation
soil_co2 = dlt_biom_c_atm() + dlt_fom_c_atm() + dlt_hum_c_atm() + dlt_res_c_atm
root_co2 = Root_respi
biom_respi = dlt_biom_c_atm()
fom_respi = dlt_fom_c_atm()
hum_respi = dlt_hum_c_atm()
resid_respi = dlt_res_c_atm
 
! total soil + root respiration
soil_root_co2 = soil_co2 + root_co2
 
if subsurface_drain >0 then
N_conc_mgLN = 100* subsurface_drain_no3 / subsurface_drain
endif
```
        manager2 SpecialReporter: same as Prairies calibration dec 2015.PFnew.paddock.SpecialReporter
        tracker: same as Prairies calibration dec 2015.PFnew.paddock.tracker
        AgPasture ryegrass_clover_paspalum
          Nspecies = 3  # Number of species
          thisCropName = ryegrass_clover_paspalum  # Crop name shown as on the simulation tree
          cropName = ryegrass whiteclover paspalum  # Species names
          micrometType = grass     grass    grass  # crop type for MicroMet
          isAnnual = 0           0          0  # Annual species? no=0, yes=1
          isLegume = 0           0          0  # Legume species? no=0, yes=1
          photoPath = 3           4          3  # C3 or C4 species? C3=3, C4=4
          rootDepth = 1600 1550 1500
          rlvp = 1 1 1  # Root distribution parameter ([0-1] relative to Root depth)
          growthTmin = 3.6455928E+00     3.1664609E+00     4.0000000E-01  # Minimum temperature for growth
          growthTmax = 3.6000000E+01     4.5000000E+01     4.1000000E+01  # Maximum temperature for growth
          growthTopt = 2.2500000E+01     2.2802369E+01     2.8543513E+01  # Optimum temperature for growth
          growthTq = 1.5       1.5        1.5  # Curvture of growth response to temperature
          massFluxTmin = 5           5          5  # Minimum temperature for mass flux
          massFluxTopt = 20        20         20  # Optimum temperature for mass flux
          massFluxW0 = 2          2           2  # Scale factor for response of mass flux to soil moisture
          massFluxWopt = 0.5       0.5        0.5  # Optimum soil moisture for mass flux
          heatOnsetT = 38.390269406        38.000000000         35.481849730  # Heat effects- Onset temperature
          heatFullT = 40.983371573        46.000000000         41.272191134  # Heat effects- Full temperature
          heatSumT = 36.939310938          33.000000000         35.948772898  # Heat effects- Temperature sum for recovery
          coldOnsetT = 2.6150056756         3.1606047652         4.0000000000  # Cold effects- Onset temperature
          coldFullT = -.9914351598          -1.007263686         -.9997215961  # Cold effects- Full temperature
          coldSumT = 20         20        20  # Cold effects- Temperature sum for recovery
          Pm = 1.6138558E+00     1.7493120E+00    1.6039454E+00  # Reference CO2 assimilation rate (mg CO2/m2.s)
          maintRespiration = 2.7500000E+00  2.70298923E+00    2.706073932E+00  # Maintenance respiration coefficient (%)
          growthEfficiency = 7.5758981E-01    7.5000000E-01     7.5000000E-01
          SLA = 20       20         20  # Specific leaf area
          lightExtCoeff = .63674137831   .47972078054    .58276262769  # Light extinction coefficient
          stockParameter = 0.05     0.05      0.05  # Stock influence parameter
          maxRootFraction = .29335154384   .31005615228     .30239561524  # Maximum biomass fraction allocated to root
          leafRate = 3.5         3.5           3.5  # Reference leaf appearance rate without stress
          fLeaf = .53808649546    .61061766662    .70000000000  # Reference growth partition to leaves
          fStolon = 0.2          0           0  # Reference growth partition to stolon
          digestLive = 0.9       0.9        0.9  # Digestibility of live plant material
          digestDead = 0.9       0.9       0.9  # Digestibility of dead plant material
          dmtotal = 50    50       50  # Initial shoot dry matter (kg/ha)
          dmlitter = 50      50          50  # Initial litter dry matter (kg/ha)
          dmgreenmin = 50      50         50  # Minimum green dry matter (kg/ha)
          NcleafOpt = 2.6539131718    2.4000000000    3.0000000000  # N concentration - leaf optimum
          NcleafMax = 2.7089815314    3.0297088084    3.1366629996  # N concentration - leaf luxary
          NcleafMin = .66723199764    .55000000000    .55000000000  # N concentration - leaf scenescent
          NcstemFr = 5.0860278E-01   4.8365882E-01     .50234340956  # Stem N concentration as fraction of leaf N concentration
          NcstolFr = 0.4         0         0  # Stolon N concentration as fraction of leaf N concentration
          NcrootFr = .44308765510      .49056422305     .44988344081  # Root N concentration as fraction of leaf N concentration
          NMinFix = .1       0       0  # Minimum N fixation (when soil N is sufficient)
          NMaxFix = .6       0       0  # Maximum N fixation (when soil N is unavailable)
          CO2PmaxScale = 700     700       700  # CO2 - Scale factor for CO2 effect on photosynthesis
          CO2NScale = 600     600       600  # CO2 - Scale factor for CO2 effects on plant N concentration
          CO2NMin = 0.7      0.7        0.7  # CO2 - Minimum fraction that plant N concentration may reduce to uder elevated CO2
          CO2NCurvature = 2         2           2  # CO2 - Curvature factor of CO2 effect on plant N concentration
          Frgr = 1         1           1  # Relative growth factor
          WaterUptakeSource = apsim  # Water uptake done by AgPasture (calc) or by apsim?
          waterStressFactor = 0.5 0.5 0.5  # Scale factor of water stress on plant growth [0-1]
          rateLive2Dead = .0142370481602  .0142103293450 .0142864225675
          rateDead2Litter = .08698084441 .07980521432 .08639544340
          rateRootSen = .00625115072 .00951677664 .00694292939
          waterStressFactor = 0.1 0.1 0.1  # water stress
        Soil NicolletRanae_InitializedPrairie -> /simulations/Prairies calibration sep 2016/noN/paddock/NicolletRanae_InitializedPrairie
          SoilTemperature2: MaxTTimeDefault=14; BoundaryLayerConductanceSource=calc; BoundaryLayerConductance=20; BoundaryLayerConductanceIterations=1; NetRadiationSource=calc; DefaultWindSpeed=3; DefaultAltitude=18; DefaultInstrumentHeight=1.2; BareSoilHeight=57
          Water
            Thickness  BD     AirDry  LL15   DUL    SAT    KS
            37         1.21   0.12    0.14   0.263  0.435  500
            38         1.21   0.14    0.161  0.296  0.462  500
            50         1.39   0.11    0.11   0.256  0.443  500
            90         1.478  0.11    0.11   0.254  0.446  500
            85         1.5    0.12    0.12   0.293  0.478  500
            100        1.5    0.125   0.125  0.262  0.455  500
            200        1.5    0.132   0.132  0.262  0.41   500
            300        1.551  0.1     0.1    0.296  0.394  250
            300        1.551  0.11    0.11   0.296  0.36   20
            320        1.551  0.138   0.138  0.296  0.34   6
            300        1.551  0.165   0.165  0.296  0.32   1.5
            180        1.84   0.146   0.146  0.274  0.31   0.2
            400        1.83   0.144   0.144  0.272  0.3    0.01
            SoilCrop ryegrass_clover_paspalum
              LL=[0.14, 0.161, 0.11, 0.11, 0.12, 0.125, 0.132, 0.1, 0.11, 0.138, 0.165, 0.146, 0.144]
              KL=[0, 0, 0, 0, 0, 0, 0, 0, 0, 0, 0, 0, 0]
              XF=[1, 1, 1, 1, 1, 1, 1, 1, 1, 1, 1, 0.2, 0]
            SoilCrop maize
              LL=[0.14, 0.161, 0.11, 0.11, 0.12, 0.125, 0.132, 0.1, 0.11, 0.138, 0.165, 0.146, 0.144]
              KL=[0.1, 0.1, 0.1, 0.02, 0.02, 0.01, 0.01, 0.01, 0.01, 0, 0, 0, 0]
              XF=[1, 1, 1, 1, 1, 1, 1, 1, 1, 1, 1, 0, 0]
    simulation noN -> /simulations/Prairies calibration sep 2016/fertil
      area paddock -> /simulations/Prairies calibration sep 2016/fertil/paddock
        folder Manager folder -> /simulations/Prairies calibration sep 2016/fertil/paddock/Manager folder
          manager N fertilization
            # When should fertiliser be applied
            fert_date = 15-apr  # Enter fertiliser date (dd-mmm)
            fert_criteria = 1000  # Don't add fertiliser if N in top 2 layers exceeds (kg/ha)
            # Fertiliser application details
            fertmodule = fertiliser  # Module used to apply the fertiliser
            fert_amount = 0  # Amount of fertiliser to apply (kg/ha)
            fert_type = NO3_N  # Fertiliser type
            on start_of_day:
            script: same as in Prairies calibration dec 2015.PFnew.paddock.Manager folder.N fertilization
          operations Prairie opeartions
            6/6/2008  ryegrass_clover_paspalum sow
            10/10/2008  ryegrass_clover_paspalum graze type = 'residue', amount = 250
            12/10/2008  surfaceorganicmatter tillage type = user_defined, f_incorp = 0.10 (), tillage_depth = 0.0 ()
            10/10/2009  ryegrass_clover_paspalum graze type = 'residue', amount = 250
            12/10/2009  surfaceorganicmatter tillage type = user_defined, f_incorp = .5606707100 (), tillage_depth = 0.0 ()
            10/10/2010  ryegrass_clover_paspalum graze type = 'residue', amount = 250
            12/10/2010  surfaceorganicmatter tillage type = user_defined, f_incorp = .5606707100 (), tillage_depth = 0.0 ()
            10/10/2011  ryegrass_clover_paspalum graze type = 'residue', amount = 250
            12/10/2011  surfaceorganicmatter tillage type = user_defined, f_incorp = .5606707100 (), tillage_depth = 0.0 ()
            10/10/2012  ryegrass_clover_paspalum graze type = 'residue', amount = 250
            12/10/2012  surfaceorganicmatter tillage type = user_defined, f_incorp = .5606707100 (), tillage_depth = 0.0 ()
            10/10/2013  ryegrass_clover_paspalum graze type = 'residue', amount = 250
            12/10/2013  surfaceorganicmatter tillage type = user_defined, f_incorp = .5606707100 (), tillage_depth = 0.0 ()
            10/10/2014  ryegrass_clover_paspalum graze type = 'residue', amount = 250
            12/10/2014  surfaceorganicmatter tillage type = user_defined, f_incorp = .5606707100 (), tillage_depth = 0.0 ()
            10/10/2015  ryegrass_clover_paspalum graze type = 'residue', amount = 250
            12/10/2015  surfaceorganicmatter tillage type = user_defined, f_incorp = .606707100 (), tillage_depth = 0.0 ()
            10/10/2016  ryegrass_clover_paspalum graze type = 'residue', amount = 250
            12/10/2016  surfaceorganicmatter tillage type = user_defined, f_incorp = .66707100 (), tillage_depth = 0.0 ()
            10/10/2017  ryegrass_clover_paspalum graze type = 'residue', amount = 250
            12/10/2017  surfaceorganicmatter tillage type = user_defined, f_incorp = .66707100 (), tillage_depth = 0.0 ()
            10/10/2018  ryegrass_clover_paspalum graze type = 'residue', amount = 250
            12/10/2018  surfaceorganicmatter tillage type = user_defined, f_incorp = .66707100 (), tillage_depth = 0.0 ()
            10/10/2019  ryegrass_clover_paspalum graze type = 'residue', amount = 250
            12/10/2019  surfaceorganicmatter tillage type = user_defined, f_incorp = .66707100 (), tillage_depth = 0.0 ()
            10/10/2020  ryegrass_clover_paspalum graze type = 'residue', amount = 250
            12/10/2020  surfaceorganicmatter tillage type = user_defined, f_incorp = .66707100 (), tillage_depth = 0.0 ()
            10/10/2021  ryegrass_clover_paspalum graze type = 'residue', amount = 250
            12/10/2021  surfaceorganicmatter tillage type = user_defined, f_incorp = .66707100 (), tillage_depth = 0.0 ()
            10/10/2022  ryegrass_clover_paspalum graze type = 'residue', amount = 250
            12/10/2022  surfaceorganicmatter tillage type = user_defined, f_incorp = .66707100 (), tillage_depth = 0.0 ()
            10/10/2023  ryegrass_clover_paspalum graze type = 'residue', amount = 250
            12/10/2023  surfaceorganicmatter tillage type = user_defined, f_incorp = .66707100 (), tillage_depth = 0.0 ()
            10/10/2024  ryegrass_clover_paspalum graze type = 'residue', amount = 250
            12/10/2024  surfaceorganicmatter tillage type = user_defined, f_incorp = .66707100 (), tillage_depth = 0.0 ()
            10/10/2025  ryegrass_clover_paspalum graze type = 'residue', amount = 250
            12/10/2025  surfaceorganicmatter tillage type = user_defined, f_incorp = .66707100 (), tillage_depth = 0.0 ()
            10/10/2026  ryegrass_clover_paspalum graze type = 'residue', amount = 250
            12/10/2026  surfaceorganicmatter tillage type = user_defined, f_incorp = .66707100 (), tillage_depth = 0.0 ()
            10/10/2027  ryegrass_clover_paspalum graze type = 'residue', amount = 250
            12/10/2027  surfaceorganicmatter tillage type = user_defined, f_incorp = .66707100 (), tillage_depth = 0.0 ()
            10/10/2028  ryegrass_clover_paspalum graze type = 'residue', amount = 250
            12/10/2028  surfaceorganicmatter tillage type = user_defined, f_incorp = .66707100 (), tillage_depth = 0.0 ()
            10/10/2029  ryegrass_clover_paspalum graze type = 'residue', amount = 250
            12/10/2029  surfaceorganicmatter tillage type = user_defined, f_incorp = .66707100 (), tillage_depth = 0.0 ()
            10/10/2030  ryegrass_clover_paspalum graze type = 'residue', amount = 250
            12/10/2030  surfaceorganicmatter tillage type = user_defined, f_incorp = .66707100 (), tillage_depth = 0.0 ()
            10/10/2031  ryegrass_clover_paspalum graze type = 'residue', amount = 250
            12/10/2031  surfaceorganicmatter tillage type = user_defined, f_incorp = .66707100 (), tillage_depth = 0.0 ()
            10/10/2032  ryegrass_clover_paspalum graze type = 'residue', amount = 250
            12/10/2032  surfaceorganicmatter tillage type = user_defined, f_incorp = .66707100 (), tillage_depth = 0.0 ()
            10/10/2033  ryegrass_clover_paspalum graze type = 'residue', amount = 250
            12/10/2033  surfaceorganicmatter tillage type = user_defined, f_incorp = .66707100 (), tillage_depth = 0.0 ()
            10/10/2034  ryegrass_clover_paspalum graze type = 'residue', amount = 250
            12/10/2034  surfaceorganicmatter tillage type = user_defined, f_incorp = .66707100 (), tillage_depth = 0.0 ()
            10/10/2035  ryegrass_clover_paspalum graze type = 'residue', amount = 250
            12/10/2035  surfaceorganicmatter tillage type = user_defined, f_incorp = .66707100 (), tillage_depth = 0.0 ()
            10/10/2036  ryegrass_clover_paspalum graze type = 'residue', amount = 250
            12/10/2036  surfaceorganicmatter tillage type = user_defined, f_incorp = .66707100 (), tillage_depth = 0.0 ()
            10/10/2037  ryegrass_clover_paspalum graze type = 'residue', amount = 250
            12/10/2037  surfaceorganicmatter tillage type = user_defined, f_incorp = .66707100 (), tillage_depth = 0.0 ()
            10/10/2038  ryegrass_clover_paspalum graze type = 'residue', amount = 250
            12/10/2038  surfaceorganicmatter tillage type = user_defined, f_incorp = .66707100 (), tillage_depth = 0.0 ()
            10/10/2039  ryegrass_clover_paspalum graze type = 'residue', amount = 250
            12/10/2039  surfaceorganicmatter tillage type = user_defined, f_incorp = .66707100 (), tillage_depth = 0.0 ()
            10/10/2040  ryegrass_clover_paspalum graze type = 'residue', amount = 250
            12/10/2040  surfaceorganicmatter tillage type = user_defined, f_incorp = .66707100 (), tillage_depth = 0.0 ()
            10/10/2041  ryegrass_clover_paspalum graze type = 'residue', amount = 250
            12/10/2041  surfaceorganicmatter tillage type = user_defined, f_incorp = .66707100 (), tillage_depth = 0.0 ()
            10/10/2042  ryegrass_clover_paspalum graze type = 'residue', amount = 250
            12/10/2042  surfaceorganicmatter tillage type = user_defined, f_incorp = .66707100 (), tillage_depth = 0.0 ()
            10/10/2043  ryegrass_clover_paspalum graze type = 'residue', amount = 250
            12/10/2043  surfaceorganicmatter tillage type = user_defined, f_incorp = .66707100 (), tillage_depth = 0.0 ()
            10/10/2044  ryegrass_clover_paspalum graze type = 'residue', amount = 250
            12/10/2044  surfaceorganicmatter tillage type = user_defined, f_incorp = .66707100 (), tillage_depth = 0.0 ()
            10/10/2045  ryegrass_clover_paspalum graze type = 'residue', amount = 250
            12/10/2045  surfaceorganicmatter tillage type = user_defined, f_incorp = .66707100 (), tillage_depth = 0.0 ()
            10/10/2046  ryegrass_clover_paspalum graze type = 'residue', amount = 250
            12/10/2046  surfaceorganicmatter tillage type = user_defined, f_incorp = .66707100 (), tillage_depth = 0.0 ()
            10/10/2047  ryegrass_clover_paspalum graze type = 'residue', amount = 250
            12/10/2047  surfaceorganicmatter tillage type = user_defined, f_incorp = .66707100 (), tillage_depth = 0.0 ()
            10/10/2048  ryegrass_clover_paspalum graze type = 'residue', amount = 250
            12/10/2048  surfaceorganicmatter tillage type = user_defined, f_incorp = .66707100 (), tillage_depth = 0.0 ()
            10/10/2049  ryegrass_clover_paspalum graze type = 'residue', amount = 250
            12/10/2049  surfaceorganicmatter tillage type = user_defined, f_incorp = .66707100 (), tillage_depth = 0.0 ()
            10/10/2050  ryegrass_clover_paspalum graze type = 'residue', amount = 250
            12/10/2050  surfaceorganicmatter tillage type = user_defined, f_incorp = .66707100 (), tillage_depth = 0.0 ()
            10/10/2051  ryegrass_clover_paspalum graze type = 'residue', amount = 250
            12/10/2051  surfaceorganicmatter tillage type = user_defined, f_incorp = .66707100 (), tillage_depth = 0.0 ()
            10/10/2052  ryegrass_clover_paspalum graze type = 'residue', amount = 250
            12/10/2052  surfaceorganicmatter tillage type = user_defined, f_incorp = .66707100 (), tillage_depth = 0.0 ()
            10/10/2053  ryegrass_clover_paspalum graze type = 'residue', amount = 250
            12/10/2053  surfaceorganicmatter tillage type = user_defined, f_incorp = .66707100 (), tillage_depth = 0.0 ()
            10/10/2054  ryegrass_clover_paspalum graze type = 'residue', amount = 250
            12/10/2054  surfaceorganicmatter tillage type = user_defined, f_incorp = .66707100 (), tillage_depth = 0.0 ()
            10/10/2055  ryegrass_clover_paspalum graze type = 'residue', amount = 250
            12/10/2055  surfaceorganicmatter tillage type = user_defined, f_incorp = .66707100 (), tillage_depth = 0.0 ()
            10/10/2056  ryegrass_clover_paspalum graze type = 'residue', amount = 250
            12/10/2056  surfaceorganicmatter tillage type = user_defined, f_incorp = .66707100 (), tillage_depth = 0.0 ()
            10/10/2057  ryegrass_clover_paspalum graze type = 'residue', amount = 250
            12/10/2057  surfaceorganicmatter tillage type = user_defined, f_incorp = .66707100 (), tillage_depth = 0.0 ()
            10/10/2058  ryegrass_clover_paspalum graze type = 'residue', amount = 250
            12/10/2058  surfaceorganicmatter tillage type = user_defined, f_incorp = .66707100 (), tillage_depth = 0.0 ()
            10/10/2059  ryegrass_clover_paspalum graze type = 'residue', amount = 250
            12/10/2059  surfaceorganicmatter tillage type = user_defined, f_incorp = .66707100 (), tillage_depth = 0.0 ()
            10/10/2060  ryegrass_clover_paspalum graze type = 'residue', amount = 250
            12/10/2060  surfaceorganicmatter tillage type = user_defined, f_incorp = .66707100 (), tillage_depth = 0.0 ()
            10/10/2061  ryegrass_clover_paspalum graze type = 'residue', amount = 250
            12/10/2061  surfaceorganicmatter tillage type = user_defined, f_incorp = .66707100 (), tillage_depth = 0.0 ()
            10/10/2062  ryegrass_clover_paspalum graze type = 'residue', amount = 250
            12/10/2062  surfaceorganicmatter tillage type = user_defined, f_incorp = .66707100 (), tillage_depth = 0.0 ()
            10/10/2063  ryegrass_clover_paspalum graze type = 'residue', amount = 250
            12/10/2063  surfaceorganicmatter tillage type = user_defined, f_incorp = .66707100 (), tillage_depth = 0.0 ()
            10/10/2064  ryegrass_clover_paspalum graze type = 'residue', amount = 250
            12/10/2064  surfaceorganicmatter tillage type = user_defined, f_incorp = .66707100 (), tillage_depth = 0.0 ()
        Soil NicolletRanae_InitializedPrairie: NearestTown=Ames; State=Iowa; Country=US; ApsoilNumber=34; Latitude=0; Longitude=0; YearOfSampling=0; DataSource=web soil survey data revised
          SoilTemperature2: MaxTTimeDefault=14; BoundaryLayerConductanceSource=calc; BoundaryLayerConductance=20; BoundaryLayerConductanceIterations=1; NetRadiationSource=calc; DefaultWindSpeed=1.5; DefaultAltitude=270; DefaultInstrumentHeight=1.2; BareSoilHeight=2
          SoilOrganicMatter: RootCN=22; RootWt=776; SoilCN=11; EnrACoeff=7.4; EnrBCoeff=0.2; OCUnits=Total
            Thickness  OC    FBiom  FInert
            37         3.02  0.08   0.319
            38         2.94  0.092  0.328
            50         2.6   0.057  0.386
            90         2.33  0.011  0.452
            85         2.1   0.011  0.493
            100        1.31  0.014  0.533
            200        1.33  0.011  0.75
            300        1.15  0.01   0.82
            300        0.49  0.01   0.9
            320        0.16  0.01   0.95
            300        0.1   0.01   0.95
            180        0.05  0.01   0.99
            400        0.01  0.01   0.99
          Analysis: PHUnits=Water; BoronUnits=HotWater
            Thickness  PH      ParticleSizeSand  ParticleSizeSilt  ParticleSizeClay
            37         6.318   38.29             36.04             25.67
            38         6.318   38.29             36.04             25.67
            50         5.902   37.95             35.65             26.43
            90         5.9476  36.57             35.65             28.09
            85         5.959   36.23             35.65             28.5
            100        6.7     34                37                29
            200        6.7     34                37                29
            300        7.9     37                36                27
            300        7.9     37                36                27
            320        7.9     37                36                27
            300        7.9     37                36                27
            180        8       37                36                27
            400        8       37                36                27
          Sample Initial nitrogen: NO3Units=kgha; NH4Units=kgha; SWUnits=Volumetric; OCUnits=Total; PHUnits=Water
            Thickness  NO3  NH4  SW
            37         1    1    0.252
            38         1    0.9  0.284
            50         3    1.2  0.246
            90         5    0.5  0.244
            85         10   0.4  0.281
            100        10   0.3  0.252
            200        10   0.4  0.252
            300        0    0.5  0.284
            300        0    0.2  0.284
            320        0    0.7  0.296
            300        0    0.5  0.296
            180        1    0.5  0.274
            400        1    0.5  0.272
          Swim: Salb=0.13; CN2Bare=65; CNRed=20; CNCov=0.8; KDul=0.3; PSIDul=-100; VC=true; DTmin=0; DTmax=1440; MaxWaterIncrement=10; SpaceWeightingFactor=0; SoluteSpaceWeightingFactor=0; Diagnostics=false
            SwimSoluteParameters: same as Prairies calibration dec 2015.PFnew.paddock.NicolletRanae_Initialized.Swim.SwimSoluteParameters
            SwimWaterTable: WaterTableDepth=1070
            SwimSubsurfaceDrain: DrainDepth=1070; DrainSpacing=13500; DrainRadius=52; Klat=2800; ImpermDepth=3900
          Water
            Thickness  BD     AirDry  LL15   DUL    SAT    KS
            37         1.21   0.12    0.14   0.263  0.435  500
            38         1.21   0.14    0.161  0.296  0.462  500
            50         1.39   0.11    0.11   0.256  0.443  500
            90         1.478  0.11    0.11   0.254  0.446  500
            85         1.5    0.12    0.12   0.293  0.478  500
            100        1.5    0.125   0.125  0.262  0.455  500
            200        1.5    0.132   0.132  0.262  0.41   500
            300        1.551  0.1     0.1    0.296  0.394  250
            300        1.551  0.11    0.11   0.296  0.36   20
            320        1.551  0.138   0.138  0.296  0.34   6
            300        1.551  0.165   0.165  0.296  0.32   1.5
            180        1.84   0.146   0.146  0.274  0.31   0.2
            400        1.83   0.144   0.144  0.272  0.3    0.01
            SoilCrop ryegrass_clover_paspalum
              LL=[0.14, 0.161, 0.11, 0.11, 0.12, 0.125, 0.132, 0.1, 0.11, 0.138, 0.165, 0.146, 0.144]
              KL=[0.1, 0.1, 0.1, 0.09, 0.09, 0.08, 0.07, 0.07, 0.07, 0.06, 0.01, 0, 0]
              XF=[1, 1, 1, 1, 1, 1, 1, 1, 1, 1, 1, 0.2, 0]
            SoilCrop maize: same as Prairies calibration sep 2016.fertil.paddock.NicolletRanae_InitializedPrairie.Water.maize
          ini: filename=Soil-prairies.xml
        outputfile -> /simulations/Prairies calibration sep 2016/fertil/paddock/outputfile: filename=noN.out; title=noN
          variables agpasture -> /simulations/Prairies calibration sep 2016/fertil/paddock/outputfile/agpasture
          variables soil -> /simulations/Prairies calibration sep 2016/fertil/paddock/outputfile/soil
          variables add -> /simulations/Prairies calibration sep 2016/fertil/paddock/outputfile/add
          events time step -> /simulations/Prairies calibration sep 2016/fertil/paddock/outputfile/time step
        AgPasture ryegrass_clover_paspalum
          Nspecies = 3  # Number of species
          thisCropName = ryegrass_clover_paspalum  # Crop name shown as on the simulation tree
          cropName = ryegrass whiteclover paspalum  # Species names
          micrometType = grass     grass    grass  # crop type for MicroMet
          isAnnual = 0           0          0  # Annual species? no=0, yes=1
          isLegume = 0           0          0  # Legume species? no=0, yes=1
          photoPath = 3           4          3  # C3 or C4 species? C3=3, C4=4
          rootDepth = 1700 1550 1500
          rlvp = 1 1 1  # Root distribution parameter ([0-1] relative to Root depth)
          growthTmin = 3.6455928E+00     3.1664609E+00     4.0000000E-01  # Minimum temperature for growth
          growthTmax = 3.6000000E+01     4.5000000E+01     4.1000000E+01  # Maximum temperature for growth
          growthTopt = 2.2500000E+01     2.2802369E+01     2.8543513E+01  # Optimum temperature for growth
          growthTq = 1.5       1.5        1.5  # Curvture of growth response to temperature
          massFluxTmin = 5           5          5  # Minimum temperature for mass flux
          massFluxTopt = 20        20         20  # Optimum temperature for mass flux
          massFluxW0 = 2          2           2  # Scale factor for response of mass flux to soil moisture
          massFluxWopt = 0.5       0.5        0.5  # Optimum soil moisture for mass flux
          heatOnsetT = 38.390269406        38.000000000         35.481849730  # Heat effects- Onset temperature
          heatFullT = 40.983371573        46.000000000         41.272191134  # Heat effects- Full temperature
          heatSumT = 36.939310938          33.000000000         35.948772898  # Heat effects- Temperature sum for recovery
          coldOnsetT = 2.6150056756         3.1606047652         4.0000000000  # Cold effects- Onset temperature
          coldFullT = -.9914351598          -1.007263686         -.9997215961  # Cold effects- Full temperature
          coldSumT = 20         20        20  # Cold effects- Temperature sum for recovery
          Pm = 1.6138558E+00     1.7493120E+00    1.6039454E+00  # Reference CO2 assimilation rate (mg CO2/m2.s)
          maintRespiration = 2.7500000E+00  2.70298923E+00    2.706073932E+00  # Maintenance respiration coefficient (%)
          growthEfficiency = 7.5758981E-01    7.5000000E-01     7.5000000E-01
          SLA = 20       20         20  # Specific leaf area
          lightExtCoeff = .63674137831   .47972078054    .58276262769  # Light extinction coefficient
          stockParameter = 0.05     0.05      0.05  # Stock influence parameter
          maxRootFraction = .34335154384   .42005615228     .41239561524  # Maximum biomass fraction allocated to root
          leafRate = 3.5         3.5           3.5  # Reference leaf appearance rate without stress
          fLeaf = .53808649546    .61061766662    .70000000000  # Reference growth partition to leaves
          fStolon = 0.2          0           0  # Reference growth partition to stolon
          digestLive = 0.9       0.9        0.9  # Digestibility of live plant material
          digestDead = 0.9       0.9       0.9  # Digestibility of dead plant material
          dmtotal = 50    50       50  # Initial shoot dry matter (kg/ha)
          dmlitter = 50      50          50  # Initial litter dry matter (kg/ha)
          dmgreenmin = 50      50         50  # Minimum green dry matter (kg/ha)
          NcleafOpt = 2.6539131718    2.4000000000    3.0000000000  # N concentration - leaf optimum
          NcleafMax = 2.7089815314    3.0297088084    3.1366629996  # N concentration - leaf luxary
          NcleafMin = .66723199764    .55000000000    .55000000000  # N concentration - leaf scenescent
          NcstemFr = 5.0860278E-01   4.8365882E-01     .50234340956  # Stem N concentration as fraction of leaf N concentration
          NcstolFr = 0.4         0         0  # Stolon N concentration as fraction of leaf N concentration
          NcrootFr = .44308765510      .49056422305     .44988344081  # Root N concentration as fraction of leaf N concentration
          NMinFix = .1       0       0  # Minimum N fixation (when soil N is sufficient)
          NMaxFix = .6       0       0  # Maximum N fixation (when soil N is unavailable)
          CO2PmaxScale = 700     700       700  # CO2 - Scale factor for CO2 effect on photosynthesis
          CO2NScale = 600     600       600  # CO2 - Scale factor for CO2 effects on plant N concentration
          CO2NMin = 0.7      0.7        0.7  # CO2 - Minimum fraction that plant N concentration may reduce to uder elevated CO2
          CO2NCurvature = 2         2           2  # CO2 - Curvature factor of CO2 effect on plant N concentration
          Frgr = 1         1           1  # Relative growth factor
          WaterUptakeSource = apsim  # Water uptake done by AgPasture (calc) or by apsim?
          waterStressFactor = 0.5 0.5 0.5  # Scale factor of water stress on plant growth [0-1]
          rateLive2Dead = .0142370481602  .0142103293450 .0142864225675
          rateDead2Litter = .08698084441 .07980521432 .08639544340
          rateRootSen = .00625115072 .00951677664 .00694292939
          waterStressFactor = 0.1 0.1 0.1  # water stress
    memo Below Figs with measured data
      sept 2016 (sva):

      management
      ---------------------
      ** ryegrass_clover_paspalum graze type = 'residue', amount = 175 (from 250) - affect the biomass (to lower/equal), surfac wt substantally, when set to 400 biomass increased/equal. i like the 175, can be year specific also to match surface om, right now is constant.
      ** surfaceorganicmatter tillage type = user_defined, f_incorp = 0.40 (from 0.8) - affect surface om, not the biomass, to consider also

      crop
      -------------
      base or opt temp less impact, not much of a response
      Heat effects- Onset temperature	32        34         32 --> (-4 from what we have now) work very well and have huge impact and improved everything!
      Cold effects- Onset temperature	5.8         5.5         7.0--> (+3 from default) has some impact but i prefer the default
      specific leaf area from 20 to 15 --> SWIM failed, 20 to 18 --> SWIM failed again, do not chnage this param, too much sensitive
      Light extinction coefficient	0.35 (from 0.5)     0.45 (from 0.3)      0.42 (same) --> yes we have changes everywhere, but better keep that at default. note the species 1 dm went up while i decreased the kc and the overal biomass,
      Light extinction coefficient	0.75 (from 0.5)     0.30 (same)      0.42 (same) --> yes we have changes everywhere. note the species 1 dm went down while i increased the kc and the species 2 became the dominant,
      Reference growth partition to leaves	0.4  (from 0.5)     0.5 (from 0.6)        0.4 (from 0.6)--> LAI decreased to more acceptable levels, biomass almost the same, N% the same, species distribution chnage as well. i like that
      Reference CO2 assimilation rate (mg CO2/m2.s)	1.4 (from 1.6)        1.65 (from 1.85)          1.53 (same)--> not much effect on biomass or LAI, i like that.
      Growth efficiency	0.72 (from 0.82)      0.75 (from 0.85)    0.75 (from 0.85)--> little lower biomass, lower LAI, i like that change. the default growth effiency in all models is 0.75 or 0.7.
      Maintenance respiration coefficient (%)	2.55(from 1.95)          2.50(from 1.9)        2.55 (from 1.95)--> huge impact (lower biomass), but swim failed in 2013.
      Maintenance respiration coefficient (%)	2.15(from 1.95)          2.10(from 1.9)        2.15 (from 1.95)--> huge impact (lower biomass), i like that. The default in models is around 2 to 3%.
      Maximum biomass fraction allocated to root	0.4  (from 0.3 in all species) --> huge impact (lower biomass, higher roots), not good results.
      Reference leaf appearance rate without stress	2.5 (from 0.35 in all species) --> none effect.
      N concentration - leaf scenescent	0.5   (from 0.65 in all species) --> suprisingly not effect, but in the unfert. p should have a huge effect.
      rate live 2 dead	0.05 (from 0.02 in all species)--> sim failed. senescence is occuring very fast
      rate live 2 dead	0.01 (from 0.02 in all species)--> higher biomass because senence is occuring slower. big impact on surface wt. So this param is to be changes by a little if needed.
      rate dead 2 litter	0.04 (from 0.08 in all species)-->not much of an effect.
      rate dead 2 litter	0.04 (from 0.08 in all species)-->not much of an effect.
      rate root sen	0.02 (from 0.008 in all species)--> a bit lower biomass and root but for the root it improved the fit to data. roots decomp faster, more N to the system or more N needed?
      water stress	0.5  (from 0.1 in all species) --> sim failed in the dry year.
      water stress	0.2  (from 0.1 in all species) --> a little lower biomass in the dry year. i like that, because if we are to increase ground water table influence to get tile drainage right, perhaps this is the way to adjust biomass.

      source code
      --------------------
      The cure was the addition of a single number "2" in the source code/equation: dNrootSen = 2 * (Ncroot * dRootSen - NrootRemob). Note that right now the value is 3.5, why i do not know.

      what needs to be done
      -----------------------------------------
      1. between P and PF the params should be the same, right now they differ in: a) light extinction, b) max C allocation to roots and c) min N conc. The b is the most important. To solve that we have to fix a bug in the code that Val admitted (the root/shoot function is not working as it should). We can fix that either emprirically (change max c allocation as a function of Nitrogen - to be added in the source code by Isaiah) or mechanistically by improving the existing algorithm. Done from my end, Isaiah needs to add some code in the source code (see excel).
      2. table with param values splited in various categories  - done (see excel file)
      3. we first fix tile drainage/NO3 load and then we move to the crop calibration
      4. manual re-calibration of some parameters
      5. PEST help to finilize estimates (not all, just some parameters). We will put emphasis on crop aspects (biomass and root and CO2) and not soil water/temp data. Isaiah make a list of what we do not know well (pest assumptions/defaults/weighting, to ask Rob Malone).
      6. run a sensible analysis, to see how stable the praire model is (different levels of N and/or climate files and/or management (residue removal)). To me this is the most IMPORTANT part.
      7. output/calculate WUE and NUE for the study period and provide a complete a W/N balance - already done this so as long as we have the new results it should be very easy.
      8. figures and results writting.
  AgPasture ryegrass_clover_paspalum sept 2015 P
    Nspecies = 3  # Number of species
    thisCropName = ryegrass_clover_paspalum  # Crop name shown as on the simulation tree
    cropName = ryegrass whiteclover paspalum  # Species names
    micrometType = grass     grass    grass  # crop type for MicroMet
    isAnnual = 0           0          0  # Annual species? no=0, yes=1
    isLegume = 0           0          0  # Legume species? no=0, yes=1
    photoPath = 3           4          3  # C3 or C4 species? C3=3, C4=4
    rootDepth = 1200 1200 1100
    rlvp = 1.0 1.0 1.0  # Root distribution parameter ([0-1] relative to Root depth)
    growthTmin = 4          2.8         0.4  # Minimum temperature for growth
    growthTmax = 36        45         41  # Maximum temperature for growth
    growthTopt = 24       28         28  # Optimum temperature for growth
    growthTq = 1.5       1.5        1.5  # Curvture of growth response to temperature
    massFluxTmin = 5           5          5  # Minimum temperature for mass flux
    massFluxTopt = 20        20         20  # Optimum temperature for mass flux
    massFluxW0 = 2          2           2  # Scale factor for response of mass flux to soil moisture
    massFluxWopt = 0.5       0.5        0.5  # Optimum soil moisture for mass flux
    heatOnsetT = 36        38         36  # Heat effects- Onset temperature
    heatFullT = 42        46         42  # Heat effects- Full temperature
    heatSumT = 33          33         33  # Heat effects- Temperature sum for recovery
    coldOnsetT = 2.8         2.5         4.0  # Cold effects- Onset temperature
    coldFullT = -1          -1         -1  # Cold effects- Full temperature
    coldSumT = 20         20        20  # Cold effects- Temperature sum for recovery
    Pm = 1.6         1.85          1.53  # Reference CO2 assimilation rate (mg CO2/m2.s)
    maintRespiration = 1.95      1.90        1.95  # Maintenance respiration coefficient (%)
    growthEfficiency = 0.82      0.85     0.85
    SLA = 20       20         20  # Specific leaf area
    lightExtCoeff = 0.35      0.56       0.42  # Light extinction coefficient
    stockParameter = 0.05     0.05      0.05  # Stock influence parameter
    maxRootFraction = 0.42  0.42  0.42  # Maximum biomass fraction allocated to root
    leafRate = 3.5         3.5           3.5  # Reference leaf appearance rate without stress
    fLeaf = 0.5       0.6        0.6  # Reference growth partition to leaves
    fStolon = 0.2          0           0  # Reference growth partition to stolon
    digestLive = 0.9       0.9        0.9  # Digestibility of live plant material
    digestDead = 0.9       0.9       0.9  # Digestibility of dead plant material
    dmtotal = 50    50       50  # Initial shoot dry matter (kg/ha)
    dmlitter = 50      50          50  # Initial litter dry matter (kg/ha)
    dmgreenmin = 50      50         50  # Minimum green dry matter (kg/ha)
    NcleafOpt = 2.7          2.4       2.7  # N concentration - leaf optimum
    NcleafMax = 3.1          2.8       3.0  # N concentration - leaf luxary
    NcleafMin = 0.65       0.65       0.65  # N concentration - leaf scenescent
    NcstemFr = 0.4      0.4         0.4  # Stem N concentration as fraction of leaf N concentration
    NcstolFr = 0.4         0         0  # Stolon N concentration as fraction of leaf N concentration
    NcrootFr = 0.57      0.57     0.57  # Root N concentration as fraction of leaf N concentration
    NMinFix = .1       0       0  # Minimum N fixation (when soil N is sufficient)
    NMaxFix = .6       0       0  # Maximum N fixation (when soil N is unavailable)
    CO2PmaxScale = 700     700       700  # CO2 - Scale factor for CO2 effect on photosynthesis
    CO2NScale = 600     600       600  # CO2 - Scale factor for CO2 effects on plant N concentration
    CO2NMin = 0.7      0.7        0.7  # CO2 - Minimum fraction that plant N concentration may reduce to uder elevated CO2
    CO2NCurvature = 2         2           2  # CO2 - Curvature factor of CO2 effect on plant N concentration
    Frgr = 1         1           1  # Relative growth factor
    WaterUptakeSource = apsim  # Water uptake done by AgPasture (calc) or by apsim?
    waterStressFactor = 0.5 0.5 0.5  # Scale factor of water stress on plant growth [0-1]
    rateLive2Dead = 0.02  0.02 0.02
    rateDead2Litter = 0.08 0.08 0.08
    rateRootSen = 0.008 0.008 0.008
    waterStressFactor = 0.1 0.1 0.1  # water stress
  AgPasture ryegrass_clover_paspalum sep 2016 P: same as Prairies calibration dec 2015.Pnew.paddock.ryegrass_clover_paspalum
  operations Prairie opeartions: same as Prairies calibration dec 2015.Pnew.paddock.Manager folder.Prairie opeartions
  Soil SoilCobsNew: YearOfSampling=0; DataSource=CSIRO Sustainable Ecosystems, Toowoomba
    Comments=Soil naming structure: \State\Region\Classification-Local Name (Site/district and locator number); oc and ph estimated
    Water
      Thickness  BD     AirDry  LL15   DUL    SAT    KS
      37         1.21   0.12    0.14   0.263  0.435  500
      38         1.21   0.14    0.161  0.296  0.462  500
      50         1.39   0.11    0.11   0.256  0.443  500
      90         1.478  0.11    0.11   0.254  0.446  500
      85         1.5    0.12    0.12   0.293  0.478  500
      100        1.5    0.125   0.125  0.262  0.455  500
      200        1.5    0.132   0.132  0.262  0.41   500
      300        1.551  0.1     0.1    0.296  0.394  250
      300        1.551  0.11    0.11   0.296  0.36   20
      320        1.551  0.138   0.138  0.296  0.34   6
      300        1.551  0.165   0.165  0.296  0.32   1.5
      180        1.84   0.146   0.146  0.274  0.31   0.2
      400        1.83   0.144   0.144  0.272  0.3    0.01
      BD, DUL source: Field measured and checked for sensibility (layer 1, 2, 3, 4, 5, 6, 7)
      AirDry, LL15 source: Estimated based on local knowledge (layer 1, 2, 3, 4, 5, 6, 7)
      SAT source: Calculated from measured, estimated or calculated BD (layer 1, 2, 3, 4, 5, 6, 7)
      SoilCrop maize
        LL=[0.14, 0.161, 0.11, 0.11, 0.12, 0.125, 0.132, 0.1, 0.11, 0.138, 0.165, 0.146, 0.144]
        KL=[0.08, 0.08, 0.08, 0.08, 0.08, 0.08, 0.04, 0.03, 0.02, 0.01, 0.01, 0.01, 0]
        XF=[1, 1, 1, 1, 1, 1, 1, 1, 1, 1, 1, 1, 0]
      SoilCrop soybean
        LL=[0.14, 0.161, 0.11, 0.11, 0.12, 0.125, 0.132, 0.1, 0.11, 0.138, 0.165, 0.146, 0.144]
        KL=[0.08, 0.08, 0.08, 0.08, 0.08, 0.04, 0.03, 0.03, 0.01, 0.01, 0, 0, 0]
        XF=[1, 1, 1, 1, 1, 1, 1, 1, 1, 1, 0, 0, 0]
      SoilCrop wheat
        LL=[0.14, 0.161, 0.11, 0.11, 0.12, 0.125, 0.132, 0.1, 0.11, 0.138, 0.165, 0.146, 0.144]
        KL=[0.1, 0.1, 0.1, 0.1, 0.1, 0.1, 0.1, 0.1, 0.1, 0.1, 0, 0, 0]
        XF=[1, 1, 1, 1, 1, 1, 1, 1, 1, 0, 0, 0, 0]
        LL source: Estimated based on local knowledge (layer 1, 2, 3, 4, 5, 6, 7)
    SoilOrganicMatter: RootCN=23; RootWt=776; SoilCN=11; EnrACoeff=7.4; EnrBCoeff=0.2; OCUnits=WalkleyBlack
      Thickness  OC    FBiom  FInert
      37         3.02  0.08   0.319
      38         2.94  0.092  0.328
      50         2.6   0.057  0.386
      90         2.33  0.011  0.452
      85         2.1   0.011  0.493
      100        1.31  0.014  0.533
      200        1.33  0.011  0.75
      300        1.15  0.01   0.82
      300        0.49  0.01   0.9
      320        0.16  0.01   0.95
      300        0.1   0.01   0.95
      180        0.1   0.01   0.99
      400        0.1   0.01   0.99
      OC source: Estimated based on local knowledge (layer 1, 2, 3, 4, 5, 6, 7)
    Analysis: PHUnits=Water; BoronUnits=HotWater
      Thickness  PH     ParticleSizeSand  ParticleSizeSilt  ParticleSizeClay
      37         6.318  38.29             36.04             25.67
      38         6.318  38.29             36.04             25.67
      50         5.902  37.95             35.65             26.43
      90         5.948  36.57             35.65             28.09
      85         5.959  36.23             35.65             28.5
      100        6.7    34                37                29
      200        6.7    34                37                29
      300        7.9    37                36                27
      300        7.9    37                36                27
      320        7.9    37                36                27
      300        7.9    37                36                27
      180        7.9    37                36                27
      400        7.9    37                36                27
      PH source: Estimated based on local knowledge (layer 1, 2, 3, 4, 5, 6, 7)
    Sample InitialNitrogen: NO3Units=kgha; NH4Units=kgha; SWUnits=Volumetric; OCUnits=Total; PHUnits=Water
      Thickness  NO3      NH4      SW
      37         0.62678  0.4477   0.252
      38         0.87362  0.41382  0.284
      50         1.529    0.834    0.246
      90         6.651    0.6651   0.244
      85         8.0325   0.51     0.281
      100        1.1      0.45     0.252
      200        2.5      1.2      0.252
      300        2.5      2.3265   0.284
      300        3.5      0.9306   0.284
      320        1.9      3.47424  0.284
      300        0.8      2.3265   0.284
      180        0.3312   0.6624   0.271
      400        0.732    1.464    0.262
    Swim: Salb=0.13; CN2Bare=65; CNRed=20; CNCov=0.8; KDul=0.3; PSIDul=-100; VC=true; DTmin=0; DTmax=1440; MaxWaterIncrement=10; SpaceWeightingFactor=0; SoluteSpaceWeightingFactor=0; Diagnostics=false
      SwimSoluteParameters: same as Prairies calibration dec 2015.PFnew.paddock.NicolletRanae_Initialized.Swim.SwimSoluteParameters
      SwimSubsurfaceDrain: DrainDepth=1070; DrainSpacing=13500; DrainRadius=52; Klat=2800; ImpermDepth=3900
    ini: filename=Soil_Cobs_Forecast2016.xml
    SoilTemperature: BoundaryLayerConductance=20; InitialSoilTemperature=[10, 10, 10, 10, 10, 10, 10, 10, 10, 10, 10, 10, 10]
      Thickness=[37, 38, 50, 90, 85, 100, 200, 300, 300, 320, 300, 180, 400]
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